# OpenSim document version 30000
Model jumper10dof24musc.osim:
  length_units: meters
  force_units: N
  gravity: 0 -9.80665 0
  credits:
    A planar reduced gait model with 10 degrees of freedom and 18 muscles by Ajay Seth. Closely based on Delp S.L., Loan J.P., Hoy M.G., Zajac F.E., Topp E.L., Rosen J.M., Thelen D.G., Anderson F.C., Seth A. Notes: 3D, 23 DOF gait model created by D.G. Thelen, Univ. of Wisconsin-Madison, and Ajay Seth, Frank C. Anderson, and Scott L. Delp, Stanford University. Lower extremity joint defintions based on Delp et al. (1990). Low back joint and anthropometry based on Anderson and Pandy (1999, 2001). Planar knee model of Yamaguchi and Zajac (1989). Seth replaced tibia translation constraints with a CustomJoint for the knee and removed the patella to eliminate all kinematic constraints; insertions of the quadrucepts are handled with moving points in the tibia frame as defined by Delp 1990. Number of muscles was reduced by Anderson to improve simulation speed for demonstrations and is not intended to be used in research. License: Creative Commons (CCBY 3.0). You are free to distribute, remix, tweak, and build upon this work, even commercially, as long as you credit us for the original creation. http://creativecommons.org/licenses/by/3.0/ More Information: http://simtk-confluence.stanford.edu:8080/display/OpenSim/Gait+2392+and+2354+Models
  publications:
    Delp, S.L., Loan, J.P., Hoy, M.G., Zajac, F.E., Topp E.L., Rosen, J.M.: An interactive graphics-based model of the lower extremity to study orthopaedic surgical procedures, IEEE Transactions on Biomedical Engineering, vol. 37, pp. 757-767, 1990. Yamaguchi G.T., Zajac F.E.: A planar model of the knee joint to characterize the knee extensor mechanism." J . Biomech. vol. 22. pp. 1-10. 1989. Anderson F.C., Pandy M.G.: A dynamic optimization solution for vertical jumping in three dimensions. Computer Methods in Biomechanics and Biomedical Engineering 2:201-231, 1999. Anderson F.C., Pandy M.G.: Dynamic optimization of human walking. Journal of Biomechanical Engineering 123:381-390, 2001.
  BodySet:
    Body ground: mass=0 mass_center=(0 0 0) inertia_xx=0 inertia_yy=0 inertia_zz=0
    Body pelvis: mass=11.777 mass_center=(-0.0707 0 0) inertia_xx=0.1028 inertia_yy=0.0871 inertia_zz=0.0579
        meshes=(sacrum.vtp pelvis.vtp l_pelvis.vtp)
      CustomJoint ground_pelvis: parent_body=ground location_in_parent=(0 0 0) location=(0 0 0)
        Coordinate pelvis_tilt: motion_type=rotational default_value=-0.4351946 range=(-1.570796 1.570796)
            clamped=false
        Coordinate pelvis_tx: motion_type=translational default_value=-0.000925015 range=(-5 5) clamped=false
        Coordinate pelvis_ty: motion_type=translational default_value=0.7091648 range=(-1 2) clamped=false
        SpatialTransform: axes_held_at_zero=(rotation2 rotation3)
          TransformAxis rotation1: coordinates=pelvis_tilt axis=(0 0 1) LinearFunction(coefficients=1 0)
          TransformAxis translation1: coordinates=pelvis_tx axis=(1 0 0) LinearFunction(coefficients=1 0)
          TransformAxis translation2: coordinates=pelvis_ty axis=(0 1 0) LinearFunction(coefficients=1 0)
          TransformAxis translation3: axis=(0 0 1) Constant(value=0.02)
    Body femur_r: mass=9.3014 mass_center=(0 -0.17 0) inertia_xx=0.1339 inertia_yy=0.0351 inertia_zz=0.1412
        meshes=femur.vtp
      PinJoint hip_r: parent_body=pelvis location_in_parent=(-0.0707 -0.0661 0.0835) location=(0 0 0)
        Coordinate hip_flexion_r: motion_type=rotational default_value=1.32645 range=(-2.094395 2.094395) clamped=false
    Body tibia_r: mass=3.7075 mass_center=(0 -0.1867 0) inertia_xx=0.0504 inertia_yy=0.0051 inertia_zz=0.0511
        meshes=(tibia.vtp fibula.vtp)
      CustomJoint knee_r: parent_body=femur_r location_in_parent=(0 0 0) location=(0 0 0)
        Coordinate knee_angle_r: motion_type=rotational default_value=-1.396263 range=(-2.094395 0.1745329)
            clamped=false
        SpatialTransform: axes_held_at_zero=(rotation2 rotation3 translation3)
          TransformAxis rotation1: coordinates=knee_angle_r axis=(0 0 1) LinearFunction(coefficients=1 0)
          TransformAxis translation1: coordinates=knee_angle_r axis=(1 0 0)
            SimmSpline: x=(-2.0944 -1.74533 -1.39626 -1.0472 -0.698132 -0.349066 -0.174533 0.197344 0.337395 0.490178 1.52146 2.0944)
                y=(-0.0032 0.00179 0.00411 0.0041 0.00212 -0.001 -0.0031 -0.005227 -0.005435 -0.005574 -0.005435 -0.00525)
          TransformAxis translation2: coordinates=knee_angle_r axis=(0 1 0)
            SimmSpline: x=(-2.0944 -1.22173 -0.523599 -0.349066 -0.174533 0.159149 2.0944)
                y=(-0.4226 -0.4082 -0.399 -0.3976 -0.3966 -0.395264 -0.396)
    Body talus_r: mass=0.1 mass_center=(0 0 0) inertia_xx=0.001 inertia_yy=0.001 inertia_zz=0.001 meshes=talus.vtp
      PinJoint ankle_r: parent_body=tibia_r location_in_parent=(0 -0.43 0) location=(0 0 0)
        Coordinate ankle_angle_r: motion_type=rotational default_value=0.5497787 range=(-1.570796 1.570796)
            clamped=false
    Body calcn_r: mass=1.25 mass_center=(0.1 0.03 0) inertia_xx=0.0014 inertia_yy=0.0039 inertia_zz=0.0041
        meshes=foot.vtp
      WeldJoint subtalar_r: parent_body=talus_r location_in_parent=(-0.04877 -0.04195 0.00792) location=(0 0 0)
    Body toes_r: mass=0.2166 mass_center=(0.0346 0.006 -0.0175) inertia_xx=0.0001 inertia_yy=0.0002 inertia_zz=0.0001
        meshes=bofoot.vtp
      WeldJoint mtp_r: parent_body=calcn_r location_in_parent=(0.1788 -0.002 0.00108) location=(0 0 0)
    Body femur_l: mass=9.3014 mass_center=(0 -0.17 0) inertia_xx=0.1339 inertia_yy=0.0351 inertia_zz=0.1412
        meshes=l_femur.vtp
      PinJoint hip_l: parent_body=pelvis location_in_parent=(-0.0707 -0.0661 -0.0835) location=(0 0 0)
        Coordinate hip_flexion_l: motion_type=rotational default_value=1.32645 range=(-2.094395 2.094395) clamped=false
    Body tibia_l: mass=3.7075 mass_center=(0 -0.1867 0) inertia_xx=0.0504 inertia_yy=0.0051 inertia_zz=0.0511
        meshes=(l_tibia.vtp l_fibula.vtp)
      CustomJoint knee_l: parent_body=femur_l location_in_parent=(0 0 0) location=(0 0 0)
        Coordinate knee_angle_l: motion_type=rotational default_value=-1.396263 range=(-2.094395 0.1745329)
            clamped=false
        SpatialTransform: axes_held_at_zero=(rotation2 rotation3 translation3)
          TransformAxis rotation1: coordinates=knee_angle_l axis=(0 0 1) LinearFunction(coefficients=1 0)
          TransformAxis translation1: coordinates=knee_angle_l axis=(1 0 0)
            SimmSpline: x=(-2.0944 -1.74533 -1.39626 -1.0472 -0.698132 -0.349066 -0.174533 0.197344 0.337395 0.490178 1.52146 2.0944)
                y=(-0.0032 0.00179 0.00411 0.0041 0.00212 -0.001 -0.0031 -0.005227 -0.005435 -0.005574 -0.005435 -0.00525)
          TransformAxis translation2: coordinates=knee_angle_l axis=(0 1 0)
            SimmSpline: x=(-2.0944 -1.22173 -0.523599 -0.349066 -0.174533 0.159149 2.0944)
                y=(-0.4226 -0.4082 -0.399 -0.3976 -0.3966 -0.395264 -0.396)
    Body talus_l: mass=0.1 mass_center=(0 0 0) inertia_xx=0.001 inertia_yy=0.001 inertia_zz=0.001 meshes=l_talus.vtp
      PinJoint ankle_l: parent_body=tibia_l location_in_parent=(0 -0.43 0) location=(0 0 0)
        Coordinate ankle_angle_l: motion_type=rotational default_value=0.5497787 range=(-1.047198 1.047198)
            clamped=false
    Body calcn_l: mass=1.25 mass_center=(0.1 0.03 0) inertia_xx=0.0014 inertia_yy=0.0039 inertia_zz=0.0041
        meshes=l_foot.vtp
      WeldJoint subtalar_l: parent_body=talus_l location_in_parent=(-0.04877 -0.04195 -0.00792) location=(0 0 0)
    Body toes_l: mass=0.2166 mass_center=(0.0346 0.006 0.0175) inertia_xx=0.0001 inertia_yy=0.0002 inertia_zz=0.0001
        meshes=l_bofoot.vtp
      WeldJoint mtp_l: parent_body=calcn_l location_in_parent=(0.1788 -0.002 -0.00108) location=(0 0 0)
    Body torso: mass=34.2366 mass_center=(-0.03 0.32 0) inertia_xx=1.4745 inertia_yy=0.7555 inertia_zz=1.4314
        meshes=(hat_spine.vtp hat_jaw.vtp hat_skull.vtp hat_ribs.vtp)
      PinJoint back: parent_body=pelvis location_in_parent=(-0.1007 0.0815 0) location=(0 0 0)
        Coordinate lumbar_extension: motion_type=rotational default_value=-0.1745329 range=(-1.570796 1.570796)
            clamped=false
  ForceSet:
    Thelen2003Muscle [values shared by the 24 below unless stated]: min_control=0 max_control=1 optimal_force=1
        max_contraction_velocity=10 default_activation=0.05 default_fiber_length=0.1 activation_time_constant=0.01
        deactivation_time_constant=0.04 FmaxTendonStrain=0.033 FmaxMuscleStrain=0.6 KshapeActive=0.5 KshapePassive=4
        Af=0.3 Flen=1.8 fv_linear_extrap_threshold=0.95
    Thelen2003Muscle hamstrings_r: max_isometric_force=2700 optimal_fiber_length=0.109 tendon_slack_length=0.326
        pennation_angle_at_optimal=0 [radians]
      PathPoint bifemlh_r-P1: pelvis (-0.12596 -0.10257 0.06944)
      PathPoint bifemlh_r-P2: tibia_r (-0.0301 -0.036 0.02943)
      PathPoint bifemlh_r-P3: tibia_r (-0.0234 -0.0563 0.0343)
    Thelen2003Muscle bifemsh_r: max_isometric_force=804 optimal_fiber_length=0.173 tendon_slack_length=0.089
        pennation_angle_at_optimal=0.4014257
      PathPoint P1: femur_r (0.005 -0.2111 0.0234)
      PathPoint P2: tibia_r (-0.0301 -0.036 0.02943)
      PathPoint P3: tibia_r (-0.0234 -0.0563 0.0343)
    Thelen2003Muscle glut_max_r: max_isometric_force=1944 optimal_fiber_length=0.147 tendon_slack_length=0.127
        pennation_angle_at_optimal=0
      PathPoint glut_max2_r-P1: pelvis (-0.1349 0.0176 0.0563)
      PathPoint glut_max2_r-P2: pelvis (-0.1376 -0.052 0.0914)
      PathPoint glut_max2_r-P3: femur_r (-0.0426 -0.053 0.0293)
      PathPoint glut_max2_r-P4: femur_r (-0.0156 -0.1016 0.0419)
    Thelen2003Muscle iliopsoas_r: max_isometric_force=2342 optimal_fiber_length=0.1 tendon_slack_length=0.16
        pennation_angle_at_optimal=0.1396263
      PathPoint psoas_r-P1: pelvis (-0.0647 0.0887 0.0289)
      PathPoint psoas_r-P2: pelvis (-0.0238 -0.057 0.0759)
      ConditionalPathPoint psoas_r-P3: pelvis (-0.0288 -0.0805 0.0816) range=(-1.5708 0.785398)
          coordinate=hip_flexion_r
      PathPoint psoas_r-P4: femur_r (0.0016 -0.0507 0.0038)
      PathPoint psoas_r-P5: femur_r (-0.0188 -0.0597 0.0104)
    Thelen2003Muscle rect_fem_r: max_isometric_force=1169 optimal_fiber_length=0.114 tendon_slack_length=0.31
        pennation_angle_at_optimal=0.08726646
      PathPoint P1: pelvis (-0.0295 -0.0311 0.0968)
      ConditionalPathPoint P2: femur_r (0.0334 -0.403 0.0019) range=(-2.61799 -1.45997) coordinate=knee_angle_r
      MovingPathPoint P3: tibia_r (0.0583536 0.0218343 0.0014) x_coordinate=knee_angle_r y_coordinate=knee_angle_r
          z_coordinate=knee_angle_r
        x_location: SimmSpline: x=(-2.0944 -1.99997 -1.5708 -1.45752 -1.39626 -1.0472 -0.698132 -0.526391 -0.349066 -0.174533 0 0.00017453 0.00034907 0.0279253 0.0872665 0.174533 2.0944)
            y=(0.0155805 0.0179938 0.0275081 0.0296564 0.0307615 0.0365695 0.0422074 0.0450902 0.048391 0.0534299 0.0617576 0.0617669 0.0617762 0.0633083 0.066994 0.0733035 0.0573481)
        y_location: SimmSpline: x=(-2.0944 -1.99997 -1.5708 -1.45752 -1.39626 -1.0472 -0.698132 -0.526391 -0.349066 -0.174533 0 0.00017453 0.00034907 0.0279253 0.0872665 0.174533 2.0944)
            y=(0.0234116 0.0237613 0.0251141 0.0252795 0.0253146 0.0249184 0.0242373 0.0238447 0.0234197 0.0227644 0.020984 0.0209814 0.0209788 0.0205225 0.0191754 0.0159554 -0.0673774)
        z_location: SimmSpline: x=(-2.0944 0.1745) y=(0.0014 0.0014)
    Thelen2003Muscle vasti_r: max_isometric_force=5000 optimal_fiber_length=0.107 tendon_slack_length=0.116
        pennation_angle_at_optimal=0.05235988
      PathPoint vas_int_r-P1: femur_r (0.029 -0.1924 0.031)
      PathPoint vas_int_r-P2: femur_r (0.0335 -0.2084 0.0285)
      ConditionalPathPoint vas_int_r-P3: femur_r (0.0343 -0.403 0.0055) range=(-2.61799 -1.42) coordinate=knee_angle_r
      MovingPathPoint vas_int_r-P4: tibia_r (0.0517469 0.0256655 0.0018) x_coordinate=knee_angle_r
          y_coordinate=knee_angle_r z_coordinate=knee_angle_r
        x_location: SimmSpline: x=(-2.0944 -1.99997 -1.5708 -1.45752 -1.39626 -1.0472 -0.698132 -0.526391 -0.349066 -0.174533 0 0.00017453 0.00034907 0.0279253 0.0872665 0.174533 2.0944)
            y=(0.0082733 0.0106866 0.0202042 0.022353 0.0234583 0.0292715 0.0349465 0.037871 0.0412569 0.0465287 0.0554632 0.0554735 0.0554837 0.0571717 0.061272 0.0684368 0.0648818)
        y_location: SimmSpline: x=(-2.0944 -1.99997 -1.5708 -1.45752 -1.39626 -1.0472 -0.698132 -0.526391 -0.349066 -0.174533 0 0.00017453 0.00034907 0.0279253 0.0872665 0.174533 2.0944)
            y=(0.025599 0.0259487 0.0273124 0.0274796 0.0275151 0.0271363 0.0265737 0.0263073 0.0261187 0.0260129 0.0252923 0.0252911 0.0252898 0.0250526 0.0242191 0.0218288 -0.0685706)
        z_location: SimmSpline: x=(-2.0944 2.0944) y=(0.0018 0.0018)
    Thelen2003Muscle gastroc_r: max_isometric_force=2500 optimal_fiber_length=0.09 tendon_slack_length=0.36
        pennation_angle_at_optimal=0.296706
      PathPoint med_gas_r-P1: femur_r (-0.019 -0.3929 -0.0235)
      ConditionalPathPoint med_gas_r-P2: femur_r (-0.03 -0.4022 -0.0258) range=(-0.785398 0.174533)
          coordinate=knee_angle_r
      PathPoint med_gas_r-P3: calcn_r (0 0.031 -0.0053)
    Thelen2003Muscle soleus_r: max_isometric_force=5137 optimal_fiber_length=0.05 tendon_slack_length=0.25
        pennation_angle_at_optimal=0.4363323
      PathPoint P1: tibia_r (-0.0024 -0.1533 0.0071)
      PathPoint P2: calcn_r (0 0.031 -0.0053)
    Thelen2003Muscle tib_ant_r: max_isometric_force=3000 optimal_fiber_length=0.098 tendon_slack_length=0.223
        pennation_angle_at_optimal=0.08726646
      PathPoint P1: tibia_r (0.0179 -0.1624 0.0115)
      PathPoint P2: tibia_r (0.0329 -0.3951 -0.0177)
      PathPoint P3: calcn_r (0.1166 0.0178 -0.0305)
    Thelen2003Muscle ercspn_r: max_isometric_force=2500 optimal_fiber_length=0.12 tendon_slack_length=0.03
        pennation_angle_at_optimal=0
      PathPoint P1: pelvis (-0.14 0.0439 0.0436)
      PathPoint P2: torso (-0.055 0.11 0.0241)
    Thelen2003Muscle intobl_r: max_isometric_force=900 optimal_fiber_length=0.1 tendon_slack_length=0.1
        pennation_angle_at_optimal=0
      PathPoint P1: pelvis (-0.04 0.07 0.1157)
      PathPoint P2: torso (0.07 0.16 0.015)
    Thelen2003Muscle extobl_r: max_isometric_force=900 optimal_fiber_length=0.12 tendon_slack_length=0.14
        pennation_angle_at_optimal=0
      PathPoint P1: pelvis (-0.03 -0.0636 0.01)
      PathPoint P2: torso (0.065 0.11 0.11)
    Thelen2003Muscle hamstrings_l: max_isometric_force=2700 optimal_fiber_length=0.109 tendon_slack_length=0.326
        pennation_angle_at_optimal=0
      PathPoint bifemlh_l-P1: pelvis (-0.12596 -0.10257 -0.06944)
      PathPoint bifemlh_l-P2: tibia_l (-0.0301 -0.036 -0.02943)
      PathPoint bifemlh_l-P3: tibia_l (-0.0234 -0.0563 -0.0343)
    Thelen2003Muscle bifemsh_l: max_isometric_force=804 optimal_fiber_length=0.173 tendon_slack_length=0.089
        pennation_angle_at_optimal=0.4014257
      PathPoint P1: femur_l (0.005 -0.2111 -0.0234)
      PathPoint P2: tibia_l (-0.0301 -0.036 -0.02943)
      PathPoint P3: tibia_l (-0.0234 -0.0563 -0.0343)
    Thelen2003Muscle glut_max_l: max_isometric_force=1944 optimal_fiber_length=0.147 tendon_slack_length=0.127
        pennation_angle_at_optimal=0
      PathPoint glut_max2_l-P1: pelvis (-0.1349 0.0176 -0.0563)
      PathPoint glut_max2_l-P2: pelvis (-0.1376 -0.052 -0.0914)
      PathPoint glut_max2_l-P3: femur_l (-0.0426 -0.053 -0.0293)
      PathPoint glut_max2_l-P4: femur_l (-0.0156 -0.1016 -0.0419)
    Thelen2003Muscle iliopsoas_l: max_isometric_force=2342 optimal_fiber_length=0.1 tendon_slack_length=0.16
        pennation_angle_at_optimal=0.1396263
      PathPoint psoas_l-P1: pelvis (-0.0647 0.0887 -0.0289)
      PathPoint psoas_l-P2: pelvis (-0.0238 -0.057 -0.0759)
      ConditionalPathPoint psoas_l-P3: pelvis (-0.0288 -0.0805 -0.0816) range=(-1.5708 0.785398)
          coordinate=hip_flexion_l
      PathPoint psoas_l-P4: femur_l (0.0016 -0.0507 -0.0038)
      PathPoint psoas_l-P5: femur_l (-0.0188 -0.0597 -0.0104)
    Thelen2003Muscle rect_fem_l: max_isometric_force=1169 optimal_fiber_length=0.114 tendon_slack_length=0.31
        pennation_angle_at_optimal=0.08726646
      PathPoint P1: pelvis (-0.0295 -0.0311 -0.0968)
      ConditionalPathPoint P2: femur_l (0.0334 -0.403 -0.0019) range=(-2.61799 -1.45997) coordinate=knee_angle_l
      MovingPathPoint P3: tibia_l (0.0583536 0.0218343 -0.0014) x_coordinate=knee_angle_l y_coordinate=knee_angle_l
          z_coordinate=knee_angle_l
        x_location: SimmSpline: x=(-2.0944 -1.99997 -1.5708 -1.45752 -1.39626 -1.0472 -0.698132 -0.526391 -0.349066 -0.174533 0 0.00017453 0.00034907 0.0279253 0.0872665 0.174533 2.0944)
            y=(0.0155805 0.0179938 0.0275081 0.0296564 0.0307615 0.0365695 0.0422074 0.0450902 0.048391 0.0534299 0.0617576 0.0617669 0.0617762 0.0633083 0.066994 0.0733035 0.0573481)
        y_location: SimmSpline: x=(-2.0944 -1.99997 -1.5708 -1.45752 -1.39626 -1.0472 -0.698132 -0.526391 -0.349066 -0.174533 0 0.00017453 0.00034907 0.0279253 0.0872665 0.174533 2.0944)
            y=(0.0234116 0.0237613 0.0251141 0.0252795 0.0253146 0.0249184 0.0242373 0.0238447 0.0234197 0.0227644 0.020984 0.0209814 0.0209788 0.0205225 0.0191754 0.0159554 -0.0673774)
        z_location: SimmSpline: x=(-2.0944 0.1745) y=(-0.0014 -0.0014)
    Thelen2003Muscle vasti_l: max_isometric_force=5000 optimal_fiber_length=0.107 tendon_slack_length=0.116
        pennation_angle_at_optimal=0.05235988
      PathPoint vas_int_l-P1: femur_l (0.029 -0.1924 -0.031)
      PathPoint vas_int_l-P2: femur_l (0.0335 -0.2084 -0.0285)
      ConditionalPathPoint vas_int_l-P3: femur_l (0.0343 -0.403 -0.0055) range=(-2.61799 -1.42) coordinate=knee_angle_l
      MovingPathPoint vas_int_l-P4: tibia_l (0.0517469 0.0256655 -0.0018) x_coordinate=knee_angle_l
          y_coordinate=knee_angle_l z_coordinate=knee_angle_l
        x_location: SimmSpline: x=(-2.0944 -1.99997 -1.5708 -1.45752 -1.39626 -1.0472 -0.698132 -0.526391 -0.349066 -0.174533 0 0.00017453 0.00034907 0.0279253 0.0872665 0.174533 2.0944)
            y=(0.0082733 0.0106866 0.0202042 0.022353 0.0234583 0.0292715 0.0349465 0.037871 0.0412569 0.0465287 0.0554632 0.0554735 0.0554837 0.0571717 0.061272 0.0684368 0.0648818)
        y_location: SimmSpline: x=(-2.0944 -1.99997 -1.5708 -1.45752 -1.39626 -1.0472 -0.698132 -0.526391 -0.349066 -0.174533 0 0.00017453 0.00034907 0.0279253 0.0872665 0.174533 2.0944)
            y=(0.025599 0.0259487 0.0273124 0.0274796 0.0275151 0.0271363 0.0265737 0.0263073 0.0261187 0.0260129 0.0252923 0.0252911 0.0252898 0.0250526 0.0242191 0.0218288 -0.0685706)
        z_location: SimmSpline: x=(-2.0944 2.0944) y=(-0.0018 -0.0018)
    Thelen2003Muscle gastroc_l: max_isometric_force=2500 optimal_fiber_length=0.09 tendon_slack_length=0.36
        pennation_angle_at_optimal=0.296706
      PathPoint med_gas_l-P1: femur_l (-0.019 -0.3929 0.0235)
      ConditionalPathPoint med_gas_l-P2: femur_l (-0.03 -0.4022 0.0258) range=(-0.785398 0.174533)
          coordinate=knee_angle_l
      PathPoint med_gas_l-P3: calcn_l (0 0.031 0.0053)
    Thelen2003Muscle soleus_l: max_isometric_force=5137 optimal_fiber_length=0.05 tendon_slack_length=0.25
        pennation_angle_at_optimal=0.4363323
      PathPoint P1: tibia_l (-0.0024 -0.1533 -0.0071)
      PathPoint P2: calcn_l (0 0.031 0.0053)
    Thelen2003Muscle tib_ant_l: max_isometric_force=3000 optimal_fiber_length=0.098 tendon_slack_length=0.223
        pennation_angle_at_optimal=0.08726646
      PathPoint P1: tibia_l (0.0179 -0.1624 -0.0115)
      PathPoint P2: tibia_l (0.0329 -0.3951 0.0177)
      PathPoint P3: calcn_l (0.1166 0.0178 0.0305)
    Thelen2003Muscle ercspn_l: max_isometric_force=2500 optimal_fiber_length=0.12 tendon_slack_length=0.03
        pennation_angle_at_optimal=0
      PathPoint P1: pelvis (-0.14 0.0439 -0.0436)
      PathPoint P2: torso (-0.055 0.11 -0.0241)
    Thelen2003Muscle intobl_l: max_isometric_force=900 optimal_fiber_length=0.1 tendon_slack_length=0.1
        pennation_angle_at_optimal=0
      PathPoint P1: pelvis (-0.04 0.07 -0.1157)
      PathPoint P2: torso (0.07 0.16 -0.015)
    Thelen2003Muscle extobl_l: max_isometric_force=900 optimal_fiber_length=0.12 tendon_slack_length=0.14
        pennation_angle_at_optimal=0
      PathPoint P1: pelvis (-0.03 -0.0636 -0.01)
      PathPoint P2: torso (0.065 0.11 -0.11)
    HuntCrossleyForce foot_r: transition_velocity=0.1
      ContactParametersSet contact_parameters:
        ContactParameters: geometry=(platform r_heel_lat r_heel_med r_toe_lat r_toe_med r_toe) stiffness=100000000
            dissipation=0.5 static_friction=0.9 dynamic_friction=0.9 viscous_friction=0.6
    HuntCrossleyForce foot_l: transition_velocity=0.1
      ContactParametersSet contact_parameters:
        ContactParameters: geometry=(platform l_heel_lat l_heel_med l_toe_lat l_toe_med l_toe) stiffness=100000000
            dissipation=0.5 static_friction=0.9 dynamic_friction=0.9 viscous_friction=0.6
    CoordinateLimitForce LumbarExtensionLimit: coordinate=lumbar_extension upper_stiffness=20 [N*m/degree]
        upper_limit=25 [degrees] lower_stiffness=20 [N*m/degree] lower_limit=-75 [degrees] damping=0.25
        transition=10 [degrees] compute_dissipation_energy=false
    CoordinateLimitForce KneeLimit_r: coordinate=knee_angle_r upper_stiffness=20 upper_limit=0 lower_stiffness=20
        lower_limit=-120 damping=0.25 transition=10 compute_dissipation_energy=false
    CoordinateLimitForce KneeLimit_l: coordinate=knee_angle_l upper_stiffness=20 upper_limit=0 lower_stiffness=20
        lower_limit=-120 damping=0.25 transition=10 compute_dissipation_energy=false
  ContactGeometrySet:
    ContactHalfSpace platform: body_name=ground location=(0 0 0) orientation=(0 0 -1.570796)
    ContactSphere r_heel_lat: body_name=calcn_r location=(0 0 0.025) radius=0.01
    ContactSphere r_heel_med: body_name=calcn_r location=(0 0 -0.035) radius=0.01
    ContactSphere r_toe_lat: body_name=calcn_r location=(0.1425 0 0.041) radius=0.01
    ContactSphere r_toe_med: body_name=calcn_r location=(0.185 0 -0.0275) radius=0.01
    ContactSphere r_toe: body_name=toes_r location=(0.071 0.002 0.014) radius=0.01
    ContactSphere l_heel_lat: body_name=calcn_l location=(0 0 -0.025) radius=0.01
    ContactSphere l_heel_med: body_name=calcn_l location=(0 0 0.035) radius=0.01
    ContactSphere l_toe_lat: body_name=calcn_l location=(0.1425 0 -0.041) radius=0.01
    ContactSphere l_toe_med: body_name=calcn_l location=(0.185 0 0.0275) radius=0.01
    ContactSphere l_toe: body_name=toes_l location=(0.071 0.002 -0.014) radius=0.01
  ControllerSet Controllers:
    PrescribedController hamstrings_r: actuator_list=hamstrings_r
      FunctionSet ControlFunctions:
        PiecewiseLinearFunction: x=(0 0.05 0.1 0.15 0.2 0.25 0.3 0.35 0.4 0.45 0.5)
            y=(0.869059 0.917207 0.920333 0.966542 0.977858 0.196864 0.309131 0.334313 0.51401 0.539684 0)
    PrescribedController hamstrings_l: actuator_list=hamstrings_l
      FunctionSet ControlFunctions:
        PiecewiseLinearFunction: x=(0 0.05 0.1 0.15 0.2 0.25 0.3 0.35 0.4 0.45 0.5)
            y=(0.869059 0.917207 0.920333 0.966542 0.977858 0.196864 0.309131 0.334313 0.51401 0.539684 0)
    PrescribedController bifemsh_r: actuator_list=bifemsh_r
      FunctionSet ControlFunctions:
        PiecewiseLinearFunction: x=(0 0.05 0.1 0.15 0.2 0.25 0.3 0.35 0.4 0.45 0.5)
            y=(0.42159 0.323157 0.425025 0.160203 0.0755029 0.064373 0.834997 0.867696 0.556258 0.291069 0)
    PrescribedController bifemsh_l: actuator_list=bifemsh_l
      FunctionSet ControlFunctions:
        PiecewiseLinearFunction: x=(0 0.05 0.1 0.15 0.2 0.25 0.3 0.35 0.4 0.45 0.5)
            y=(0.42159 0.323157 0.425025 0.160203 0.0755029 0.064373 0.834997 0.867696 0.556258 0.291069 0)
    PrescribedController glut_max_r: actuator_list=glut_max_r
      FunctionSet ControlFunctions:
        PiecewiseLinearFunction: x=(0 0.05 0.1 0.15 0.2 0.25 0.3 0.35 0.4 0.45 0.5)
            y=(0.352103 0.808151 0.880954 0.43653 0.982882 0.866579 0.555683 0.172733 0.741183 0.697913 0)
    PrescribedController glut_max_l: actuator_list=glut_max_l
      FunctionSet ControlFunctions:
        PiecewiseLinearFunction: x=(0 0.05 0.1 0.15 0.2 0.25 0.3 0.35 0.4 0.45 0.5)
            y=(0.352103 0.808151 0.880954 0.43653 0.982882 0.866579 0.555683 0.172733 0.741183 0.697913 0)
    PrescribedController iliopsoas_r: actuator_list=iliopsoas_r
      FunctionSet ControlFunctions:
        PiecewiseLinearFunction: x=(0 0.05 0.1 0.15 0.2 0.25 0.3 0.35 0.4 0.45 0.5)
            y=(0.731073 0.321782 0.0521209 0.0222612 0.0261835 0.0447833 0.944575 0.317525 0.432759 0.288337 0)
    PrescribedController iliopsoas_l: actuator_list=iliopsoas_l
      FunctionSet ControlFunctions:
        PiecewiseLinearFunction: x=(0 0.05 0.1 0.15 0.2 0.25 0.3 0.35 0.4 0.45 0.5)
            y=(0.731073 0.321782 0.0521209 0.0222612 0.0261835 0.0447833 0.944575 0.317525 0.432759 0.288337 0)
    PrescribedController rect_fem_r: actuator_list=rect_fem_r
      FunctionSet ControlFunctions:
        PiecewiseLinearFunction: x=(0 0.05 0.1 0.15 0.2 0.25 0.3 0.35 0.4 0.45 0.5)
            y=(0.936316 0.912041 0.460646 0.477613 0.494076 0.336137 0.750988 0.408971 0.769763 0.26903 0)
    PrescribedController rect_fem_l: actuator_list=rect_fem_l
      FunctionSet ControlFunctions:
        PiecewiseLinearFunction: x=(0 0.05 0.1 0.15 0.2 0.25 0.3 0.35 0.4 0.45 0.5)
            y=(0.936316 0.912041 0.460646 0.477613 0.494076 0.336137 0.750988 0.408971 0.769763 0.26903 0)
    PrescribedController vasti_r: actuator_list=vasti_r
      FunctionSet ControlFunctions:
        PiecewiseLinearFunction: x=(0 0.05 0.1 0.15 0.2 0.25 0.3 0.35 0.4 0.45 0.5)
            y=(0.174358 0.356018 0.856638 0.992298 0.998154 0.990292 0.745893 0.864719 0.954213 0.118565 0)
    PrescribedController vasti_l: actuator_list=vasti_l
      FunctionSet ControlFunctions:
        PiecewiseLinearFunction: x=(0 0.05 0.1 0.15 0.2 0.25 0.3 0.35 0.4 0.45 0.5)
            y=(0.174358 0.356018 0.856638 0.992298 0.998154 0.990292 0.745893 0.864719 0.954213 0.118565 0)
    PrescribedController gastroc_r: actuator_list=gastroc_r
      FunctionSet ControlFunctions:
        PiecewiseLinearFunction: x=(0 0.05 0.1 0.15 0.2 0.25 0.3 0.35 0.4 0.45 0.5)
            y=(0.0265939 0.13582 0.0252025 0.0825802 0.0505857 0.0842082 0.0343336 0.0509134 0.0568417 0.246301 0)
    PrescribedController gastroc_l: actuator_list=gastroc_l
      FunctionSet ControlFunctions:
        PiecewiseLinearFunction: x=(0 0.05 0.1 0.15 0.2 0.25 0.3 0.35 0.4 0.45 0.5)
            y=(0.0265939 0.13582 0.0252025 0.0825802 0.0505857 0.0842082 0.0343336 0.0509134 0.0568417 0.246301 0)
    PrescribedController soleus_r: actuator_list=soleus_r
      FunctionSet ControlFunctions:
        PiecewiseLinearFunction: x=(0 0.05 0.1 0.15 0.2 0.25 0.3 0.35 0.4 0.45 0.5)
            y=(0.124551 0.315568 0.415937 0.976139 0.985577 0.124434 0.0481191 0.0374799 0.468369 0.579246 0)
    PrescribedController soleus_l: actuator_list=soleus_l
      FunctionSet ControlFunctions:
        PiecewiseLinearFunction: x=(0 0.05 0.1 0.15 0.2 0.25 0.3 0.35 0.4 0.45 0.5)
            y=(0.124551 0.315568 0.415937 0.976139 0.985577 0.124434 0.0481191 0.0374799 0.468369 0.579246 0)
    PrescribedController tib_ant_r: actuator_list=tib_ant_r
      FunctionSet ControlFunctions:
        PiecewiseLinearFunction: x=(0 0.05 0.1 0.15 0.2 0.25 0.3 0.35 0.4 0.45 0.5)
            y=(0.950021 0.891133 0.501893 0.174344 0.0177058 0.0217048 0.961759 0.977753 0.688317 0.701929 0)
    PrescribedController tib_ant_l: actuator_list=tib_ant_l
      FunctionSet ControlFunctions:
        PiecewiseLinearFunction: x=(0 0.05 0.1 0.15 0.2 0.25 0.3 0.35 0.4 0.45 0.5)
            y=(0.950021 0.891133 0.501893 0.174344 0.0177058 0.0217048 0.961759 0.977753 0.688317 0.701929 0)
    PrescribedController ercspn_r: actuator_list=ercspn_r
      FunctionSet ControlFunctions:
        PiecewiseLinearFunction: x=(0 0.05 0.1 0.15 0.2 0.25 0.3 0.35 0.4 0.45 0.5)
            y=(0.565459 0.837595 0.899722 0.579295 0.967665 0.713563 0.61933 0.575123 0.0415847 0.787498 0)
    PrescribedController ercspn_l: actuator_list=ercspn_l
      FunctionSet ControlFunctions:
        PiecewiseLinearFunction: x=(0 0.05 0.1 0.15 0.2 0.25 0.3 0.35 0.4 0.45 0.5)
            y=(0.565459 0.837595 0.899722 0.579295 0.967665 0.713563 0.61933 0.575123 0.0415847 0.787498 0)
    PrescribedController intobl_r: actuator_list=intobl_r
      FunctionSet ControlFunctions:
        PiecewiseLinearFunction: x=(0 0.05 0.1 0.15 0.2 0.25 0.3 0.35 0.4 0.45 0.5)
            y=(0.23482 0.169567 0.196623 0.399584 0.0411822 0.642602 0.515406 0.335395 0.619091 0.788078 0)
    PrescribedController intobl_l: actuator_list=intobl_l
      FunctionSet ControlFunctions:
        PiecewiseLinearFunction: x=(0 0.05 0.1 0.15 0.2 0.25 0.3 0.35 0.4 0.45 0.5)
            y=(0.23482 0.169567 0.196623 0.399584 0.0411822 0.642602 0.515406 0.335395 0.619091 0.788078 0)
    PrescribedController extobl_r: actuator_list=extobl_r
      FunctionSet ControlFunctions:
        PiecewiseLinearFunction: x=(0 0.05 0.1 0.15 0.2 0.25 0.3 0.35 0.4 0.45 0.5)
            y=(0.0949596 0.124065 0.151554 0.284504 0.0399675 0.151886 0.576891 0.601691 0.494021 0.547287 0)
    PrescribedController extobl_l: actuator_list=extobl_l
      FunctionSet ControlFunctions:
        PiecewiseLinearFunction: x=(0 0.05 0.1 0.15 0.2 0.25 0.3 0.35 0.4 0.45 0.5)
            y=(0.0949596 0.124065 0.151554 0.284504 0.0399675 0.151886 0.576891 0.601691 0.494021 0.547287 0)
