# OpenSim document version 30000
Model Jumper:
  length_units: meters
  force_units: N
  gravity: 0 -9.80665 0
  credits:
    Delp S.L., Loan J.P., Hoy M.G., Zajac F.E., Topp E.L., Rosen J.M., Thelen D.G., Anderson F.C., Seth A., Reinbolt J.A.
  publications:
    Notes: 3D, 23 DOF gait model created by D.G. Thelen, Univ. of Wisconsin-Madison, and Ajay Seth, Frank C. Anderson, and Scott L. Delp, Stanford University. Lower extremity joint defintions based on Delp et al. (1990). Low back joint and anthropometry based on Anderson and Pandy (1999, 2001). Planar knee model of Yamaguchi and Zajac (1989). Seth removed the patella to avoid kinematic constraints; insertions of the quadrucepts are handled with moving points in the tibia frame. Number of muscles was reduced by Anderson to improve simulation speed for demonstrations and is not intended to be used in research. Delp, S.L., Loan, J.P., Hoy, M.G., Zajac, F.E., Topp E.L., Rosen, J.M.: An interactive graphics-based model of the lower extremity to study orthopaedic surgical procedures, IEEE Transactions on Biomedical Engineering, vol. 37, pp. 757-767, 1990. Yamaguchi G.T., Zajac F.E.: A planar model of the knee joint to characterize the knee extensor mechanism." J . Biomecl7. vol. 21. pp. 1-10. 1989. Anderson F.C., Pandy M.G.: A dynamic optimization solution for vertical jumping in three dimensions. Computer Methods in Biomechanics and Biomedical Engineering 2:201-231, 1999. Anderson F.C., Pandy M.G.: Dynamic optimization of human walking. Journal of Biomechanical Engineering 123:381-390, 2001.
  defaults: Thelen2003Muscle default: min_control=0 max_control=1 optimal_force=1 max_isometric_force=1000
      optimal_fiber_length=0.1 tendon_slack_length=0.2 pennation_angle_at_optimal=0 [radians]
      max_contraction_velocity=10 default_activation=0.05 default_fiber_length=0.1 activation_time_constant=0.01
      deactivation_time_constant=0.04 FmaxTendonStrain=0.033 FmaxMuscleStrain=0.6 KshapeActive=0.5 KshapePassive=4
      Af=0.3 Flen=1.8 fv_linear_extrap_threshold=0.95
  BodySet:
    Body ground: mass=0 mass_center=(0 0 0) inertia_xx=0 inertia_yy=0 inertia_zz=0 meshes=Unassigned
    Body pelvis: mass=11.777 mass_center=(-0.0707 0 0) inertia_xx=0.1028 inertia_yy=0.0871 inertia_zz=0.0579
        meshes=(sacrum.vtp pelvis.vtp l_pelvis.vtp)
      CustomJoint ground_pelvis: parent_body=ground location_in_parent=(0 0 0) location=(0 0 0)
        Coordinate pelvis_tilt: motion_type=rotational default_value=-0.4351946 range=(-1.570796 1.570796) clamped=true
        Coordinate pelvis_list: motion_type=rotational default_value=-0.000520379 range=(-1.570796 1.570796)
            clamped=true
        Coordinate pelvis_rotation: motion_type=rotational default_value=-0.000336776 range=(-1.570796 1.570796)
            clamped=true
        Coordinate pelvis_tx: motion_type=translational default_value=-0.000925015 range=(-5 5) clamped=true
        Coordinate pelvis_ty: motion_type=translational default_value=0.7091648 range=(-1 2) clamped=true
        Coordinate pelvis_tz: motion_type=translational default_value=-0.000443383 range=(-3 3) clamped=true
        SpatialTransform:
          TransformAxis rotation1: coordinates=pelvis_tilt axis=(0 0 1) LinearFunction(coefficients=1 0)
          TransformAxis rotation2: coordinates=pelvis_list axis=(1 0 0) LinearFunction(coefficients=1 0)
          TransformAxis rotation3: coordinates=pelvis_rotation axis=(0 1 0) LinearFunction(coefficients=1 0)
          TransformAxis translation1: coordinates=pelvis_tx axis=(1 0 0) LinearFunction(coefficients=1 0)
          TransformAxis translation2: coordinates=pelvis_ty axis=(0 1 0) LinearFunction(coefficients=1 0)
          TransformAxis translation3: coordinates=pelvis_tz axis=(0 0 1) LinearFunction(coefficients=1 0)
    Body femur_r: mass=9.3014 mass_center=(0 -0.17 0) inertia_xx=0.1339 inertia_yy=0.0351 inertia_zz=0.1412
        meshes=femur.vtp
      CustomJoint hip_r: parent_body=pelvis location_in_parent=(-0.0707 -0.0661 0.0835) location=(0 0 0)
        Coordinate hip_flexion_r: motion_type=rotational default_value=1.32645 range=(-2.094395 2.094395) clamped=true
        Coordinate hip_adduction_r: motion_type=rotational default_value=-0.1047198 range=(-2.094395 2.094395)
            clamped=true
        Coordinate hip_rotation_r: motion_type=rotational default_value=0.05235988 range=(-2.094395 2.094395)
            clamped=true
        SpatialTransform: axes_held_at_zero=(translation1 translation2 translation3)
          TransformAxis rotation1: coordinates=hip_flexion_r axis=(0 0 1) LinearFunction(coefficients=1 0)
          TransformAxis rotation2: coordinates=hip_adduction_r axis=(1 0 0) LinearFunction(coefficients=1 0)
          TransformAxis rotation3: coordinates=hip_rotation_r axis=(0 1 0) LinearFunction(coefficients=1 0)
    Body tibia_r: mass=3.6075 mass_center=(0 -0.187 0) inertia_xx=0.0504 inertia_yy=0.0051 inertia_zz=0.0511
        meshes=(tibia.vtp fibula.vtp)
      CustomJoint knee_r: parent_body=femur_r location_in_parent=(0 0 0) location=(0 0 0)
        Coordinate knee_angle_r: motion_type=rotational default_value=-1.396263 range=(-2.094395 0.1745329)
            clamped=true
        Coordinate tib_tx_r: motion_type=translational default_value=0.00411 range=(-5 5) clamped=false
        Coordinate tib_ty_r: motion_type=translational default_value=-0.4110552 range=(-1 2) clamped=false
        SpatialTransform: axes_held_at_zero=(rotation2 rotation3 translation3)
          TransformAxis rotation1: coordinates=knee_angle_r axis=(0 0 1) LinearFunction(coefficients=1 0)
          TransformAxis translation1: coordinates=tib_tx_r axis=(1 0 0) LinearFunction(coefficients=1 0)
          TransformAxis translation2: coordinates=tib_ty_r axis=(0 1 0) LinearFunction(coefficients=1 0)
    Body patella_r: mass=0.1 mass_center=(0 0 0) inertia_xx=0.001 inertia_yy=0.001 inertia_zz=0.001 meshes=pat.vtp
      CustomJoint tib_pat_r: parent_body=tibia_r location_in_parent=(0 0 0) location=(0 0 0)
        Coordinate pat_angle_r: motion_type=rotational default_value=0.175 range=(-2.094 0.175) clamped=false
        Coordinate pat_tx_r: motion_type=translational default_value=0.0324 range=(-5 5) clamped=false
        Coordinate pat_ty_r: motion_type=translational default_value=-0.02 range=(-5 5) clamped=false
        SpatialTransform: axes_held_at_zero=(rotation2 rotation3 translation3)
          TransformAxis rotation1: coordinates=pat_angle_r axis=(0 0 1) LinearFunction(coefficients=1 0)
          TransformAxis translation1: coordinates=pat_tx_r axis=(1 0 0) LinearFunction(coefficients=1 0)
          TransformAxis translation2: coordinates=pat_ty_r axis=(0 1 0) LinearFunction(coefficients=1 0)
    Body talus_r: mass=0.1 mass_center=(0 0 0) inertia_xx=0.001 inertia_yy=0.001 inertia_zz=0.001 meshes=talus.vtp
      CustomJoint ankle_r: parent_body=tibia_r location_in_parent=(0 -0.43 0) location=(0 0 0)
        Coordinate ankle_angle_r: motion_type=rotational default_value=0.5497787 range=(-1.571 1.571) clamped=false
        SpatialTransform: axes_held_at_zero=(rotation2 rotation3 translation1 translation2 translation3)
          TransformAxis rotation1: coordinates=ankle_angle_r axis=(-0.105 -0.174 0.979)
              LinearFunction(coefficients=1 0)
    Body calcn_r: mass=1.25 mass_center=(0.1 0.03 0) inertia_xx=0.001 inertia_yy=0.004 inertia_zz=0.004 meshes=foot.vtp
      CustomJoint subtalar_r: parent_body=talus_r location_in_parent=(-0.049 -0.042 0.008) location=(0 0 0)
        Coordinate subtalar_angle_r: motion_type=rotational default_value=0.2487094 range=(-1.571 1.571) clamped=false
            locked=true
        SpatialTransform: axes_held_at_zero=(rotation2 rotation3 translation1 translation2 translation3)
          TransformAxis rotation1: coordinates=subtalar_angle_r axis=(0.787 0.605 -0.121)
              LinearFunction(coefficients=1 0)
    Body toes_r: mass=0.217 mass_center=(0.035 0.006 -0.018) inertia_xx=0 inertia_yy=0 inertia_zz=0.001
        meshes=bofoot.vtp
      CustomJoint mtp_r: parent_body=calcn_r location_in_parent=(0.179 -0.002 0.001) location=(0 0 0)
        Coordinate mtp_angle_r: motion_type=rotational default_value=0 range=(-1.571 1.571) clamped=false locked=true
        SpatialTransform: axes_held_at_zero=(rotation2 rotation3 translation1 translation2 translation3)
          TransformAxis rotation1: coordinates=mtp_angle_r axis=(-0.581 0 0.814) LinearFunction(coefficients=1 0)
    Body femur_l: mass=9.301 mass_center=(0 -0.17 0) inertia_xx=0.134 inertia_yy=0.035 inertia_zz=0.141
        meshes=l_femur.vtp
      CustomJoint hip_l: parent_body=pelvis location_in_parent=(-0.071 -0.066 -0.084) location=(0 0 0)
        Coordinate hip_flexion_l: motion_type=rotational default_value=1.32645 range=(-2.094 2.094) clamped=false
        Coordinate hip_adduction_l: motion_type=rotational default_value=-0.1047198 range=(-2.094 2.094) clamped=false
        Coordinate hip_rotation_l: motion_type=rotational default_value=0.05235988 range=(-2.094 2.094) clamped=false
        SpatialTransform: axes_held_at_zero=(translation1 translation2 translation3)
          TransformAxis rotation1: coordinates=hip_flexion_l axis=(0 0 1) LinearFunction(coefficients=1 0)
          TransformAxis rotation2: coordinates=hip_adduction_l axis=(-1 0 0) LinearFunction(coefficients=1 0)
          TransformAxis rotation3: coordinates=hip_rotation_l axis=(0 -1 0) LinearFunction(coefficients=1 0)
    Body tibia_l: mass=3.6075 mass_center=(0 -0.187 0) inertia_xx=0.0504 inertia_yy=0.0051 inertia_zz=0.0511
        meshes=(l_tibia.vtp l_fibula.vtp)
      CustomJoint knee_l: parent_body=femur_l location_in_parent=(0 0 0) location=(0 0 0)
        Coordinate knee_angle_l: motion_type=rotational default_value=-1.396263 range=(-2.094395 0.1745329)
            clamped=false
        SpatialTransform: axes_held_at_zero=(rotation2 rotation3 translation3)
          TransformAxis rotation1: coordinates=knee_angle_l axis=(0 0 1) LinearFunction(coefficients=1 0)
          TransformAxis translation1: coordinates=knee_angle_l axis=(1 0 0)
            SimmSpline: x=(-2.0944 -1.74533 -1.39626 -1.0472 -0.698132 -0.349066 -0.174533 0.197344 0.337395 0.490178 1.52146 2.0944)
                y=(-0.0032 0.00179 0.00411 0.0041 0.00212 -0.001 -0.0031 -0.005227 -0.005435 -0.005574 -0.005435 -0.00525)
          TransformAxis translation2: coordinates=knee_angle_l axis=(0 1 0)
            SimmSpline: x=(-2.0944 -1.22173 -0.523599 -0.349066 -0.174533 0.159149 2.0944)
                y=(-0.4226 -0.4082 -0.399 -0.3976 -0.3966 -0.395264 -0.396)
    Body patella_l: mass=0.1 mass_center=(0 0 0) inertia_xx=0.001 inertia_yy=0.001 inertia_zz=0.001
        meshes=l_patella.vtp
      CustomJoint tib_pat_l: parent_body=tibia_l location_in_parent=(0 0 0) location=(0 0 0)
        Coordinate pat_angle_l: motion_type=rotational default_value=0.175 range=(-2.094 0.175) clamped=false
        Coordinate pat_tx_l: motion_type=translational default_value=0.03239996 range=(-5 5) clamped=false
        Coordinate pat_ty_l: motion_type=translational default_value=-0.02 range=(-5 5) clamped=false
        SpatialTransform: axes_held_at_zero=(rotation2 rotation3 translation3)
          TransformAxis rotation1: coordinates=pat_angle_l axis=(0 0 1) LinearFunction(coefficients=1 0)
          TransformAxis translation1: coordinates=pat_tx_l axis=(1 0 0) LinearFunction(coefficients=1 0)
          TransformAxis translation2: coordinates=pat_ty_l axis=(0 1 0) LinearFunction(coefficients=1 0)
    Body talus_l: mass=0.1 mass_center=(0 0 0) inertia_xx=0.001 inertia_yy=0.001 inertia_zz=0.001 meshes=l_talus.vtp
      CustomJoint ankle_l: parent_body=tibia_l location_in_parent=(0 -0.43 0) location=(0 0 0)
        Coordinate ankle_angle_l: motion_type=rotational default_value=0.5497787 range=(-1.047 1.047) clamped=false
        SpatialTransform: axes_held_at_zero=(rotation2 rotation3 translation1 translation2 translation3)
          TransformAxis rotation1: coordinates=ankle_angle_l axis=(0.105 0.174 0.979) LinearFunction(coefficients=1 0)
    Body calcn_l: mass=1.25 mass_center=(0.1 0.03 0) inertia_xx=0.001 inertia_yy=0.004 inertia_zz=0.004
        meshes=l_foot.vtp
      CustomJoint subtalar_l: parent_body=talus_l location_in_parent=(-0.049 -0.042 -0.008) location=(0 0 0)
        Coordinate subtalar_angle_l: motion_type=rotational default_value=0.2487094 range=(-1.571 1.571) clamped=false
            locked=true
        SpatialTransform: axes_held_at_zero=(rotation2 rotation3 translation1 translation2 translation3)
          TransformAxis rotation1: coordinates=subtalar_angle_l axis=(-0.787 -0.605 -0.121)
              LinearFunction(coefficients=1 0)
    Body toes_l: mass=0.217 mass_center=(0.035 0.006 0.018) inertia_xx=0 inertia_yy=0 inertia_zz=0.001
        meshes=l_bofoot.vtp
      CustomJoint mtp_l: parent_body=calcn_l location_in_parent=(0.179 -0.002 -0.001) location=(0 0 0)
        Coordinate mtp_angle_l: motion_type=rotational default_value=0 range=(-1.047 1.047) clamped=false locked=true
        SpatialTransform: axes_held_at_zero=(rotation2 rotation3 translation1 translation2 translation3)
          TransformAxis rotation1: coordinates=mtp_angle_l axis=(0.581 0 0.814) LinearFunction(coefficients=1 0)
    Body torso: mass=34.237 mass_center=(-0.03 0.32 0) inertia_xx=1.474 inertia_yy=0.755 inertia_zz=1.431
        meshes=(hat_spine.vtp hat_jaw.vtp hat_skull.vtp hat_ribs.vtp)
      CustomJoint back: parent_body=pelvis location_in_parent=(-0.101 0.082 0) location=(0 0 0)
        Coordinate lumbar_extension: motion_type=rotational default_value=-0.1745329 range=(-1.571 1.571) clamped=false
        Coordinate lumbar_bending: motion_type=rotational default_value=0 range=(-1.571 1.571) clamped=false
        Coordinate lumbar_rotation: motion_type=rotational default_value=0 range=(-1.571 1.571) clamped=false
        SpatialTransform: axes_held_at_zero=(translation1 translation2 translation3)
          TransformAxis rotation1: coordinates=lumbar_extension axis=(0 0 1) LinearFunction(coefficients=1 0)
          TransformAxis rotation2: coordinates=lumbar_bending axis=(1 0 0) LinearFunction(coefficients=1 0)
          TransformAxis rotation3: coordinates=lumbar_rotation axis=(0 1 0) LinearFunction(coefficients=1 0)
  ConstraintSet:
    CoordinateCouplerConstraint knee_tx_r: independent_coordinate_names=knee_angle_r dependent_coordinate_name=tib_tx_r
        scale_factor=1
      coupled_coordinates_function: SimmSpline: x=(-2.0944 -1.74533 -1.39626 -1.0472 -0.698132 -0.349066 -0.174533 0.197344 0.337395 0.490178 1.52146 2.0944)
          y=(-0.0032 0.00179 0.00411 0.0041 0.00212 -0.001 -0.0031 -0.005227 -0.005435 -0.005574 -0.005435 -0.00525)
    CoordinateCouplerConstraint knee_ty_r: independent_coordinate_names=knee_angle_r dependent_coordinate_name=tib_ty_r
        scale_factor=1
      coupled_coordinates_function: SimmSpline: x=(-2.0944 -1.22173 -0.523599 -0.349066 -0.174533 0.159149 2.0944)
          y=(-0.4226 -0.4082 -0.399 -0.3976 -0.3966 -0.395264 -0.396)
    CoordinateCouplerConstraint pat_tx_r: independent_coordinate_names=knee_angle_r dependent_coordinate_name=pat_tx_r
        scale_factor=1
      coupled_coordinates_function: SimmSpline: x=(-2.0944 -1.39626 -1.0472 -0.698132 -0.349066 -0.174533 0 0.00017453 0.00034907 0.0872665 2.0944)
          y=(0.0173 0.0324 0.0381 0.043 0.0469 0.0484 0.0496 0.0496 0.0496 0.0496 0.0496)
    CoordinateCouplerConstraint pat_ty_r: independent_coordinate_names=knee_angle_r dependent_coordinate_name=pat_ty_r
        scale_factor=1
      coupled_coordinates_function: SimmSpline: x=(-2.0944 -1.5708 -1.39626 -1.0472 -0.698132 -0.349066 -0.174533 0 0.00017453 0.00034907 0.0872665 2.0944)
          y=(-0.0219 -0.0202 -0.02 -0.0204 -0.0211 -0.0219 -0.0223 -0.0227 -0.0227 -0.0227 -0.0227 -0.0227)
    CoordinateCouplerConstraint pat_angle_r: independent_coordinate_names=knee_angle_r
        dependent_coordinate_name=pat_angle_r scale_factor=1
      coupled_coordinates_function: SimmSpline: x=(-2.0944 -1.99997 -1.45752 -0.526391 0.0279253 0.174533)
          y=(0.308051 0.308051 0.306305 0.270177 -0.037001 -0.279951)
    CoordinateCouplerConstraint pat_tx_l: independent_coordinate_names=knee_angle_l dependent_coordinate_name=pat_tx_l
        scale_factor=1
      coupled_coordinates_function: SimmSpline: x=(-2.0944 -1.39626 -1.0472 -0.698132 -0.349066 -0.174533 0 0.00017453 0.00034907 0.0872665 2.0944)
          y=(0.0173 0.0324 0.0381 0.043 0.0469 0.0484 0.0496 0.0496 0.0496 0.0496 0.0496)
    CoordinateCouplerConstraint pat_ty_l: independent_coordinate_names=knee_angle_l dependent_coordinate_name=pat_ty_l
        scale_factor=1
      coupled_coordinates_function: SimmSpline: x=(-2.0944 -1.5708 -1.39626 -1.0472 -0.698132 -0.349066 -0.174533 0 0.00017453 0.00034907 0.0872665 2.0944)
          y=(-0.0219 -0.0202 -0.02 -0.0204 -0.0211 -0.0219 -0.0223 -0.0227 -0.0227 -0.0227 -0.0227 -0.0227)
    CoordinateCouplerConstraint pat_angle_l: independent_coordinate_names=knee_angle_l
        dependent_coordinate_name=pat_angle_l scale_factor=1
      coupled_coordinates_function: SimmSpline: x=(-2.0944 -1.99997 -1.45752 -0.526391 0.0279253 0.174533)
          y=(0.308051 0.308051 0.306305 0.270177 -0.037001 -0.279951)
  ForceSet:
    Thelen2003Muscle [values shared by the 54 below unless stated]: min_control=0 max_control=1 optimal_force=1
        max_contraction_velocity=10 default_activation=0.05 default_fiber_length=0.1 activation_time_constant=0.01
        deactivation_time_constant=0.04 FmaxTendonStrain=0.033 FmaxMuscleStrain=0.6 KshapeActive=0.5 KshapePassive=4
        Af=0.3 Flen=1.8 fv_linear_extrap_threshold=0.95
    Thelen2003Muscle glut_med1_r: max_isometric_force=1119 optimal_fiber_length=0.0535 tendon_slack_length=0.078
        pennation_angle_at_optimal=0.1396263
      PathPoint P1: pelvis (-0.0408 0.0304 0.1209)
      PathPoint P2: femur_r (-0.0218 -0.0117 0.0555)
    Thelen2003Muscle glut_med2_r: max_isometric_force=873 optimal_fiber_length=0.0845 tendon_slack_length=0.053
        pennation_angle_at_optimal=0
      PathPoint P1: pelvis (-0.0855 0.0445 0.0766)
      PathPoint P2: femur_r (-0.0258 -0.0058 0.0527)
    Thelen2003Muscle glut_med3_r: max_isometric_force=1000 optimal_fiber_length=0.0646 tendon_slack_length=0.053
        pennation_angle_at_optimal=0.3316126
      PathPoint P1: pelvis (-0.1223 0.0105 0.0648)
      PathPoint P2: femur_r (-0.0309 -0.0047 0.0518)
    Thelen2003Muscle bifemlh_r: max_isometric_force=2700 optimal_fiber_length=0.109 tendon_slack_length=0.326
        pennation_angle_at_optimal=0
      PathPoint P1: pelvis (-0.12596 -0.10257 0.06944)
      PathPoint P2: tibia_r (-0.0301 -0.036 0.02943)
      PathPoint P3: tibia_r (-0.0234 -0.0563 0.0343)
    Thelen2003Muscle bifemsh_r: max_isometric_force=804 optimal_fiber_length=0.173 tendon_slack_length=0.089
        pennation_angle_at_optimal=0.4014257
      PathPoint P1: femur_r (0.005 -0.2111 0.0234)
      PathPoint P2: tibia_r (-0.0301 -0.036 0.02943)
      PathPoint P3: tibia_r (-0.0234 -0.0563 0.0343)
    Thelen2003Muscle sar_r: max_isometric_force=156 optimal_fiber_length=0.52 tendon_slack_length=0.1
        pennation_angle_at_optimal=0
      PathPoint P1: pelvis (-0.0153 -0.0013 0.1242)
      PathPoint P2: femur_r (-0.003 -0.3568 -0.0421)
      PathPoint P3: tibia_r (-0.0056 -0.0419 -0.0399)
      PathPoint P4: tibia_r (0.006 -0.0589 -0.0383)
      PathPoint P5: tibia_r (0.0243 -0.084 -0.0252)
    Thelen2003Muscle add_mag2_r: max_isometric_force=2343 optimal_fiber_length=0.121 tendon_slack_length=0.12
        pennation_angle_at_optimal=0.05235988
      PathPoint P1: pelvis (-0.0831 -0.1192 0.0308)
      PathPoint P2: femur_r (0.0054 -0.2285 0.0227)
    Thelen2003Muscle tfl_r: max_isometric_force=233 optimal_fiber_length=0.095 tendon_slack_length=0.425
        pennation_angle_at_optimal=0.05235988
      PathPoint P1: pelvis (-0.0311 0.0214 0.1241)
      PathPoint P2: femur_r (0.0294 -0.0995 0.0597)
      PathPoint P3: femur_r (0.0054 -0.4049 0.0357)
      PathPoint P4: tibia_r (0.006 -0.0487 0.0297)
    Thelen2003Muscle pect_r: max_isometric_force=266 optimal_fiber_length=0.1 tendon_slack_length=0.033
        pennation_angle_at_optimal=0
      PathPoint P1: pelvis (-0.0431 -0.0768 0.0451)
      PathPoint P2: femur_r (-0.0122 -0.0822 0.0253)
    Thelen2003Muscle grac_r: max_isometric_force=162 optimal_fiber_length=0.352 tendon_slack_length=0.126
        pennation_angle_at_optimal=0.05235988
      PathPoint P1: pelvis (-0.07401 -0.1187 0.02794)
      ConditionalPathPoint P2: tibia_r (-0.02657 -0.0319 -0.03774) range=(-0.436332 0.174533) coordinate=knee_angle_r
      PathPoint P3: tibia_r (-0.01943 -0.05153 -0.0358)
      PathPoint P4: tibia_r (0.006 -0.0836 -0.0228)
    Thelen2003Muscle glut_max1_r: max_isometric_force=573 optimal_fiber_length=0.142 tendon_slack_length=0.125
        pennation_angle_at_optimal=0.08726646
      PathPoint P1: pelvis (-0.1195 0.0612 0.07)
      PathPoint P2: pelvis (-0.1291 0.0012 0.0886)
      PathPoint P3: femur_r (-0.0457 -0.0248 0.0392)
      PathPoint P4: femur_r (-0.0277 -0.0566 0.047)
    Thelen2003Muscle glut_max2_r: max_isometric_force=819 optimal_fiber_length=0.147 tendon_slack_length=0.127
        pennation_angle_at_optimal=0
      PathPoint P1: pelvis (-0.1349 0.0176 0.0563)
      PathPoint P2: pelvis (-0.1376 -0.052 0.0914)
      PathPoint P3: femur_r (-0.0426 -0.053 0.0293)
      PathPoint P4: femur_r (-0.0156 -0.1016 0.0419)
    Thelen2003Muscle glut_max3_r: max_isometric_force=552 optimal_fiber_length=0.144 tendon_slack_length=0.145
        pennation_angle_at_optimal=0.08726646
      PathPoint P1: pelvis (-0.1556 -0.0314 0.0058)
      PathPoint P2: pelvis (-0.1529 -0.1052 0.0403)
      PathPoint P3: femur_r (-0.0299 -0.1041 0.0135)
      PathPoint P4: femur_r (-0.006 -0.1419 0.0411)
    Thelen2003Muscle iliacus_r: max_isometric_force=1073 optimal_fiber_length=0.1 tendon_slack_length=0.1
        pennation_angle_at_optimal=0.1221731
      PathPoint P1: pelvis (-0.0674 0.0365 0.0854)
      PathPoint P2: pelvis (-0.0258 -0.055 0.0811)
      ConditionalPathPoint P3: pelvis (-0.0288 -0.0805 0.0816) range=(-1.5708 0.785398) coordinate=hip_flexion_r
      PathPoint P4: femur_r (0.0017 -0.0543 0.0057)
      PathPoint P5: femur_r (-0.0193 -0.0621 0.0129)
    Thelen2003Muscle psoas_r: max_isometric_force=1113 optimal_fiber_length=0.1 tendon_slack_length=0.16
        pennation_angle_at_optimal=0.1396263
      PathPoint P1: pelvis (-0.0647 0.0887 0.0289)
      PathPoint P2: pelvis (-0.0238 -0.057 0.0759)
      ConditionalPathPoint P3: pelvis (-0.0288 -0.0805 0.0816) range=(-1.5708 0.785398) coordinate=hip_flexion_r
      PathPoint P4: femur_r (0.0016 -0.0507 0.0038)
      PathPoint P5: femur_r (-0.0188 -0.0597 0.0104)
    Thelen2003Muscle quad_fem_r: max_isometric_force=381 optimal_fiber_length=0.054 tendon_slack_length=0.024
        pennation_angle_at_optimal=0
      PathPoint P1: pelvis (-0.1143 -0.1151 0.052)
      PathPoint P2: femur_r (-0.0381 -0.0359 0.0366)
    Thelen2003Muscle gem_r: max_isometric_force=164 optimal_fiber_length=0.024 tendon_slack_length=0.039
        pennation_angle_at_optimal=0
      PathPoint P1: pelvis (-0.1133 -0.082 0.0714)
      PathPoint P2: femur_r (-0.0142 -0.0033 0.0443)
    Thelen2003Muscle peri_r: max_isometric_force=444 optimal_fiber_length=0.026 tendon_slack_length=0.115
        pennation_angle_at_optimal=0.1745329
      PathPoint P1: pelvis (-0.1396 0.0003 0.0235)
      PathPoint P2: pelvis (-0.1193 -0.0276 0.0657)
      PathPoint P3: femur_r (-0.0148 -0.0036 0.0437)
    Thelen2003Muscle rect_fem_r: max_isometric_force=1169 optimal_fiber_length=0.114 tendon_slack_length=0.31
        pennation_angle_at_optimal=0.08726646
      PathPoint P1: pelvis (-0.0295 -0.0311 0.0968)
      ConditionalPathPoint P2: femur_r (0.0334 -0.403 0.0019) range=(-2.61799 -1.45997) coordinate=knee_angle_r
      MovingPathPoint P3: tibia_r (0.0684474 0.0185254 0.0014) x_coordinate=knee_angle_r y_coordinate=knee_angle_r
          z_coordinate=knee_angle_r
        x_location: SimmSpline: x=(-2.0944 -1.99997 -1.5708 -1.45752 -1.39626 -1.0472 -0.698132 -0.526391 -0.349066 -0.174533 0 0.00017453 0.00034907 0.0279253 0.0872665 0.174533 2.0944)
            y=(0.0155805 0.0179938 0.0275081 0.0296564 0.0307615 0.0365695 0.0422074 0.0450902 0.048391 0.0534299 0.0617576 0.0617669 0.0617762 0.0633083 0.066994 0.0733035 0.0573481)
        y_location: SimmSpline: x=(-2.0944 -1.99997 -1.5708 -1.45752 -1.39626 -1.0472 -0.698132 -0.526391 -0.349066 -0.174533 0 0.00017453 0.00034907 0.0279253 0.0872665 0.174533 2.0944)
            y=(0.0234116 0.0237613 0.0251141 0.0252795 0.0253146 0.0249184 0.0242373 0.0238447 0.0234197 0.0227644 0.020984 0.0209814 0.0209788 0.0205225 0.0191754 0.0159554 -0.0673774)
        z_location: SimmSpline: x=(-2.0944 0.1745) y=(0.0014 0.0014)
    Thelen2003Muscle vas_int_r: max_isometric_force=5000 optimal_fiber_length=0.107 tendon_slack_length=0.116
        pennation_angle_at_optimal=0.05235988
      PathPoint P1: femur_r (0.029 -0.1924 0.031)
      PathPoint P2: femur_r (0.0335 -0.2084 0.0285)
      ConditionalPathPoint P3: femur_r (0.0343 -0.403 0.0055) range=(-2.61799 -1.42) coordinate=knee_angle_r
      MovingPathPoint P4: tibia_r (0.0629078 0.0237651 0.0018) x_coordinate=knee_angle_r y_coordinate=knee_angle_r
          z_coordinate=knee_angle_r
        x_location: SimmSpline: x=(-2.0944 -1.99997 -1.5708 -1.45752 -1.39626 -1.0472 -0.698132 -0.526391 -0.349066 -0.174533 0 0.00017453 0.00034907 0.0279253 0.0872665 0.174533 2.0944)
            y=(0.0082733 0.0106866 0.0202042 0.022353 0.0234583 0.0292715 0.0349465 0.037871 0.0412569 0.0465287 0.0554632 0.0554735 0.0554837 0.0571717 0.061272 0.0684368 0.0648818)
        y_location: SimmSpline: x=(-2.0944 -1.99997 -1.5708 -1.45752 -1.39626 -1.0472 -0.698132 -0.526391 -0.349066 -0.174533 0 0.00017453 0.00034907 0.0279253 0.0872665 0.174533 2.0944)
            y=(0.025599 0.0259487 0.0273124 0.0274796 0.0275151 0.0271363 0.0265737 0.0263073 0.0261187 0.0260129 0.0252923 0.0252911 0.0252898 0.0250526 0.0242191 0.0218288 -0.0685706)
        z_location: SimmSpline: x=(-2.0944 2.0944) y=(0.0018 0.0018)
    Thelen2003Muscle med_gas_r: max_isometric_force=2500 optimal_fiber_length=0.09 tendon_slack_length=0.36
        pennation_angle_at_optimal=0.296706
      PathPoint P1: femur_r (-0.019 -0.3929 -0.0235)
      ConditionalPathPoint P2: femur_r (-0.03 -0.4022 -0.0258) range=(-0.785398 0.174533) coordinate=knee_angle_r
      PathPoint P3: calcn_r (0 0.031 -0.0053)
    Thelen2003Muscle soleus_r: max_isometric_force=4000 optimal_fiber_length=0.08 tendon_slack_length=0.22
        pennation_angle_at_optimal=0.4363323
      PathPoint P1: tibia_r (-0.0024 -0.1533 0.0071)
      PathPoint P2: calcn_r (0 0.031 -0.0053)
    Thelen2003Muscle tib_post_r: max_isometric_force=3600 optimal_fiber_length=0.031 tendon_slack_length=0.31
        pennation_angle_at_optimal=0.2094395
      PathPoint P1: tibia_r (-0.0094 -0.1348 0.0019)
      PathPoint P2: tibia_r (-0.0144 -0.4051 -0.0229)
      PathPoint P3: calcn_r (0.0417 0.0334 -0.0286)
      PathPoint P4: calcn_r (0.0772 0.0159 -0.0281)
    Thelen2003Muscle tib_ant_r: max_isometric_force=3000 optimal_fiber_length=0.098 tendon_slack_length=0.223
        pennation_angle_at_optimal=0.08726646
      PathPoint P1: tibia_r (0.0179 -0.1624 0.0115)
      PathPoint P2: tibia_r (0.0329 -0.3951 -0.0177)
      PathPoint P3: calcn_r (0.1166 0.0178 -0.0305)
    Thelen2003Muscle glut_med1_l: max_isometric_force=1119 optimal_fiber_length=0.0535 tendon_slack_length=0.078
        pennation_angle_at_optimal=0.1396263
      PathPoint P1: pelvis (-0.0408 0.0304 -0.1209)
      PathPoint P2: femur_l (-0.0218 -0.0117 -0.0555)
    Thelen2003Muscle glut_med2_l: max_isometric_force=873 optimal_fiber_length=0.0845 tendon_slack_length=0.053
        pennation_angle_at_optimal=0
      PathPoint P1: pelvis (-0.0855 0.0445 -0.0766)
      PathPoint P2: femur_l (-0.0258 -0.0058 -0.0527)
    Thelen2003Muscle glut_med3_l: max_isometric_force=1000 optimal_fiber_length=0.0646 tendon_slack_length=0.053
        pennation_angle_at_optimal=0.3316126
      PathPoint P1: pelvis (-0.1223 0.0105 -0.0648)
      PathPoint P2: femur_l (-0.0309 -0.0047 -0.0518)
    Thelen2003Muscle bifemlh_l: max_isometric_force=2700 optimal_fiber_length=0.109 tendon_slack_length=0.326
        pennation_angle_at_optimal=0
      PathPoint P1: pelvis (-0.12596 -0.10257 -0.06944)
      PathPoint P2: tibia_l (-0.0301 -0.036 -0.02943)
      PathPoint P3: tibia_l (-0.0234 -0.0563 -0.0343)
    Thelen2003Muscle bifemsh_l: max_isometric_force=804 optimal_fiber_length=0.173 tendon_slack_length=0.089
        pennation_angle_at_optimal=0.4014257
      PathPoint P1: femur_l (0.005 -0.2111 -0.0234)
      PathPoint P2: tibia_l (-0.0301 -0.036 -0.02943)
      PathPoint P3: tibia_l (-0.0234 -0.0563 -0.0343)
    Thelen2003Muscle sar_l: max_isometric_force=156 optimal_fiber_length=0.52 tendon_slack_length=0.1
        pennation_angle_at_optimal=0
      PathPoint P1: pelvis (-0.0153 -0.0013 -0.1242)
      PathPoint P2: femur_l (-0.003 -0.3568 0.0421)
      PathPoint P3: tibia_l (-0.0056 -0.0419 0.0399)
      PathPoint P4: tibia_l (0.006 -0.0589 0.0383)
      PathPoint P5: tibia_l (0.0243 -0.084 0.0252)
    Thelen2003Muscle add_mag2_l: max_isometric_force=2343 optimal_fiber_length=0.121 tendon_slack_length=0.12
        pennation_angle_at_optimal=0.05235988
      PathPoint P1: pelvis (-0.0831 -0.1192 -0.0308)
      PathPoint P2: femur_l (0.0054 -0.2285 -0.0227)
    Thelen2003Muscle tfl_l: max_isometric_force=233 optimal_fiber_length=0.095 tendon_slack_length=0.425
        pennation_angle_at_optimal=0.05235988
      PathPoint P1: pelvis (-0.0311 0.0214 -0.1241)
      PathPoint P2: femur_l (0.0294 -0.0995 -0.0597)
      PathPoint P3: femur_l (0.0054 -0.4049 -0.0357)
      PathPoint P4: tibia_l (0.006 -0.0487 -0.0297)
    Thelen2003Muscle pect_l: max_isometric_force=266 optimal_fiber_length=0.1 tendon_slack_length=0.033
        pennation_angle_at_optimal=0
      PathPoint P1: pelvis (-0.0431 -0.0768 -0.0451)
      PathPoint P2: femur_l (-0.0122 -0.0822 -0.0253)
    Thelen2003Muscle grac_l: max_isometric_force=162 optimal_fiber_length=0.352 tendon_slack_length=0.126
        pennation_angle_at_optimal=0.05235988
      PathPoint P1: pelvis (-0.07401 -0.1187 -0.02794)
      ConditionalPathPoint P2: tibia_l (-0.02657 -0.0319 0.03774) range=(-0.436332 0.174533) coordinate=knee_angle_l
      PathPoint P3: tibia_l (-0.01943 -0.05153 0.0358)
      PathPoint P4: tibia_l (0.006 -0.0836 0.0228)
    Thelen2003Muscle glut_max1_l: max_isometric_force=573 optimal_fiber_length=0.142 tendon_slack_length=0.125
        pennation_angle_at_optimal=0.08726646
      PathPoint P1: pelvis (-0.1195 0.0612 -0.07)
      PathPoint P2: pelvis (-0.1291 0.0012 -0.0886)
      PathPoint P3: femur_l (-0.0457 -0.0248 -0.0392)
      PathPoint P4: femur_l (-0.0277 -0.0566 -0.047)
    Thelen2003Muscle glut_max2_l: max_isometric_force=819 optimal_fiber_length=0.147 tendon_slack_length=0.127
        pennation_angle_at_optimal=0
      PathPoint P1: pelvis (-0.1349 0.0176 -0.0563)
      PathPoint P2: pelvis (-0.1376 -0.052 -0.0914)
      PathPoint P3: femur_l (-0.0426 -0.053 -0.0293)
      PathPoint P4: femur_l (-0.0156 -0.1016 -0.0419)
    Thelen2003Muscle glut_max3_l: max_isometric_force=552 optimal_fiber_length=0.144 tendon_slack_length=0.145
        pennation_angle_at_optimal=0.08726646
      PathPoint P1: pelvis (-0.1556 -0.0314 -0.0058)
      PathPoint P2: pelvis (-0.1529 -0.1052 -0.0403)
      PathPoint P3: femur_l (-0.0299 -0.1041 -0.0135)
      PathPoint P4: femur_l (-0.006 -0.1419 -0.0411)
    Thelen2003Muscle iliacus_l: max_isometric_force=1073 optimal_fiber_length=0.1 tendon_slack_length=0.1
        pennation_angle_at_optimal=0.1221731
      PathPoint P1: pelvis (-0.0674 0.0365 -0.0854)
      PathPoint P2: pelvis (-0.0258 -0.055 -0.0811)
      ConditionalPathPoint P3: pelvis (-0.0288 -0.0805 -0.0816) range=(-1.5708 0.785398) coordinate=hip_flexion_l
      PathPoint P4: femur_l (0.0017 -0.0543 -0.0057)
      PathPoint P5: femur_l (-0.0193 -0.0621 -0.0129)
    Thelen2003Muscle psoas_l: max_isometric_force=1113 optimal_fiber_length=0.1 tendon_slack_length=0.16
        pennation_angle_at_optimal=0.1396263
      PathPoint P1: pelvis (-0.0647 0.0887 -0.0289)
      PathPoint P2: pelvis (-0.0238 -0.057 -0.0759)
      ConditionalPathPoint P3: pelvis (-0.0288 -0.0805 -0.0816) range=(-1.5708 0.785398) coordinate=hip_flexion_l
      PathPoint P4: femur_l (0.0016 -0.0507 -0.0038)
      PathPoint P5: femur_l (-0.0188 -0.0597 -0.0104)
    Thelen2003Muscle quad_fem_l: max_isometric_force=381 optimal_fiber_length=0.054 tendon_slack_length=0.024
        pennation_angle_at_optimal=0
      PathPoint P1: pelvis (-0.1143 -0.1151 -0.052)
      PathPoint P2: femur_l (-0.0381 -0.0359 -0.0366)
    Thelen2003Muscle gem_l: max_isometric_force=164 optimal_fiber_length=0.024 tendon_slack_length=0.039
        pennation_angle_at_optimal=0
      PathPoint P1: pelvis (-0.1133 -0.082 -0.0714)
      PathPoint P2: femur_l (-0.0142 -0.0033 -0.0443)
    Thelen2003Muscle peri_l: max_isometric_force=444 optimal_fiber_length=0.026 tendon_slack_length=0.115
        pennation_angle_at_optimal=0.1745329
      PathPoint P1: pelvis (-0.1396 0.0003 -0.0235)
      PathPoint P2: pelvis (-0.1193 -0.0276 -0.0657)
      PathPoint P3: femur_l (-0.0148 -0.0036 -0.0437)
    Thelen2003Muscle rect_fem_l: max_isometric_force=1169 optimal_fiber_length=0.114 tendon_slack_length=0.31
        pennation_angle_at_optimal=0.08726646
      PathPoint P1: pelvis (-0.0295 -0.0311 -0.0968)
      ConditionalPathPoint P2: femur_l (0.0334 -0.403 -0.0019) range=(-2.61799 -1.45997) coordinate=knee_angle_l
      MovingPathPoint P3: tibia_l (0.0684083 0.0185437 -0.0014) x_coordinate=knee_angle_l y_coordinate=knee_angle_l
          z_coordinate=knee_angle_l
        x_location: SimmSpline: x=(-2.0944 -1.99997 -1.5708 -1.45752 -1.39626 -1.0472 -0.698132 -0.526391 -0.349066 -0.174533 0 0.00017453 0.00034907 0.0279253 0.0872665 0.174533 2.0944)
            y=(0.0155805 0.0179938 0.0275081 0.0296564 0.0307615 0.0365695 0.0422074 0.0450902 0.048391 0.0534299 0.0617576 0.0617669 0.0617762 0.0633083 0.066994 0.0733035 0.0573481)
        y_location: SimmSpline: x=(-2.0944 -1.99997 -1.5708 -1.45752 -1.39626 -1.0472 -0.698132 -0.526391 -0.349066 -0.174533 0 0.00017453 0.00034907 0.0279253 0.0872665 0.174533 2.0944)
            y=(0.0234116 0.0237613 0.0251141 0.0252795 0.0253146 0.0249184 0.0242373 0.0238447 0.0234197 0.0227644 0.020984 0.0209814 0.0209788 0.0205225 0.0191754 0.0159554 -0.0673774)
        z_location: SimmSpline: x=(-2.0944 0.1745) y=(-0.0014 -0.0014)
    Thelen2003Muscle vas_int_l: max_isometric_force=5000 optimal_fiber_length=0.107 tendon_slack_length=0.116
        pennation_angle_at_optimal=0.05235988
      PathPoint P1: femur_l (0.029 -0.1924 -0.031)
      PathPoint P2: femur_l (0.0335 -0.2084 -0.0285)
      ConditionalPathPoint P3: femur_l (0.0343 -0.403 -0.0055) range=(-2.61799 -1.42) coordinate=knee_angle_l
      MovingPathPoint P4: tibia_l (0.0628637 0.0237782 -0.0018) x_coordinate=knee_angle_l y_coordinate=knee_angle_l
          z_coordinate=knee_angle_l
        x_location: SimmSpline: x=(-2.0944 -1.99997 -1.5708 -1.45752 -1.39626 -1.0472 -0.698132 -0.526391 -0.349066 -0.174533 0 0.00017453 0.00034907 0.0279253 0.0872665 0.174533 2.0944)
            y=(0.0082733 0.0106866 0.0202042 0.022353 0.0234583 0.0292715 0.0349465 0.037871 0.0412569 0.0465287 0.0554632 0.0554735 0.0554837 0.0571717 0.061272 0.0684368 0.0648818)
        y_location: SimmSpline: x=(-2.0944 -1.99997 -1.5708 -1.45752 -1.39626 -1.0472 -0.698132 -0.526391 -0.349066 -0.174533 0 0.00017453 0.00034907 0.0279253 0.0872665 0.174533 2.0944)
            y=(0.025599 0.0259487 0.0273124 0.0274796 0.0275151 0.0271363 0.0265737 0.0263073 0.0261187 0.0260129 0.0252923 0.0252911 0.0252898 0.0250526 0.0242191 0.0218288 -0.0685706)
        z_location: SimmSpline: x=(-2.0944 2.0944) y=(-0.0018 -0.0018)
    Thelen2003Muscle med_gas_l: max_isometric_force=2500 optimal_fiber_length=0.09 tendon_slack_length=0.36
        pennation_angle_at_optimal=0.296706
      PathPoint P1: femur_l (-0.019 -0.3929 0.0235)
      ConditionalPathPoint P2: femur_l (-0.03 -0.4022 0.0258) range=(-0.785398 0.174533) coordinate=knee_angle_l
      PathPoint P3: calcn_l (0 0.031 0.0053)
    Thelen2003Muscle soleus_l: max_isometric_force=4000 optimal_fiber_length=0.08 tendon_slack_length=0.22
        pennation_angle_at_optimal=0.4363323
      PathPoint P1: tibia_l (-0.0024 -0.1533 -0.0071)
      PathPoint P2: calcn_l (0 0.031 0.0053)
    Thelen2003Muscle tib_post_l: max_isometric_force=3600 optimal_fiber_length=0.031 tendon_slack_length=0.31
        pennation_angle_at_optimal=0.2094395
      PathPoint P1: tibia_l (-0.0094 -0.1348 -0.0019)
      PathPoint P2: tibia_l (-0.0144 -0.4051 0.0229)
      PathPoint P3: calcn_l (0.0417 0.0334 0.0286)
      PathPoint P4: calcn_l (0.0772 0.0159 0.0281)
    Thelen2003Muscle tib_ant_l: max_isometric_force=3000 optimal_fiber_length=0.098 tendon_slack_length=0.223
        pennation_angle_at_optimal=0.08726646
      PathPoint P1: tibia_l (0.0179 -0.1624 -0.0115)
      PathPoint P2: tibia_l (0.0329 -0.3951 0.0177)
      PathPoint P3: calcn_l (0.1166 0.0178 0.0305)
    Thelen2003Muscle ercspn_r: max_isometric_force=2500 optimal_fiber_length=0.12 tendon_slack_length=0.03
        pennation_angle_at_optimal=0
      PathPoint P1: pelvis (-0.14 0.0439 0.0436)
      PathPoint P2: torso (-0.055 0.11 0.0241)
    Thelen2003Muscle ercspn_l: max_isometric_force=2500 optimal_fiber_length=0.12 tendon_slack_length=0.03
        pennation_angle_at_optimal=0
      PathPoint P1: pelvis (-0.14 0.0439 -0.0436)
      PathPoint P2: torso (-0.055 0.11 -0.0241)
    Thelen2003Muscle intobl_r: max_isometric_force=900 optimal_fiber_length=0.1 tendon_slack_length=0.1
        pennation_angle_at_optimal=0
      PathPoint P1: pelvis (-0.04 0.07 0.1157)
      PathPoint P2: torso (0.07 0.16 0.015)
    Thelen2003Muscle intobl_l: max_isometric_force=900 optimal_fiber_length=0.1 tendon_slack_length=0.1
        pennation_angle_at_optimal=0
      PathPoint P1: pelvis (-0.04 0.07 -0.1157)
      PathPoint P2: torso (0.07 0.16 -0.015)
    Thelen2003Muscle extobl_r: max_isometric_force=900 optimal_fiber_length=0.12 tendon_slack_length=0.14
        pennation_angle_at_optimal=0
      PathPoint P1: pelvis (-0.03 -0.0636 0.01)
      PathPoint P2: torso (0.065 0.11 0.11)
    Thelen2003Muscle extobl_l: max_isometric_force=900 optimal_fiber_length=0.12 tendon_slack_length=0.14
        pennation_angle_at_optimal=0
      PathPoint P1: pelvis (-0.03 -0.0636 -0.01)
      PathPoint P2: torso (0.065 0.11 -0.11)
    HuntCrossleyForce foot_r: transition_velocity=0.1
      ContactParametersSet contact_parameters:
        ContactParameters: geometry=(platform r_heel_lat r_heel_med r_toe_lat r_toe_med r_toe) stiffness=100000000
            dissipation=0.5 static_friction=0.9 dynamic_friction=0.9 viscous_friction=0.6
    HuntCrossleyForce foot_l: transition_velocity=0.1
      ContactParametersSet contact_parameters:
        ContactParameters: geometry=(platform l_heel_lat l_heel_med l_toe_lat l_toe_med l_toe) stiffness=100000000
            dissipation=0.5 static_friction=0.9 dynamic_friction=0.9 viscous_friction=0.6
    CoordinateLimitForce LumbarExtensionLimit: coordinate=lumbar_extension upper_stiffness=20 [N*m/degree]
        upper_limit=25 [degrees] lower_stiffness=20 [N*m/degree] lower_limit=-75 [degrees] damping=0.25
        transition=10 [degrees] compute_dissipation_energy=false
    CoordinateLimitForce KneeLimit_r: coordinate=knee_angle_r upper_stiffness=20 upper_limit=0 lower_stiffness=20
        lower_limit=-120 damping=0.25 transition=10 compute_dissipation_energy=false
    CoordinateLimitForce KneeLimit_l: coordinate=knee_angle_l upper_stiffness=20 upper_limit=0 lower_stiffness=20
        lower_limit=-120 damping=0.25 transition=10 compute_dissipation_energy=false
    ObjectGroup R_hip_abd: members=(glut_max1_r glut_med1_r glut_med2_r glut_med3_r peri_r sar_r tfl_r)
    ObjectGroup R_hip_flex: members=(glut_med1_r grac_r iliacus_r pect_r psoas_r rect_fem_r sar_r tfl_r)
    ObjectGroup R_hip_inrot: members=(glut_med1_r iliacus_r psoas_r tfl_r)
    ObjectGroup R_hip_exrot: members=(gem_r glut_med3_r peri_r quad_fem_r)
    ObjectGroup R_hip_ext: members=(add_mag2_r bifemlh_r glut_max1_r glut_max2_r glut_max3_r glut_med3_r)
    ObjectGroup R_hip_add: members=(add_mag2_r bifemlh_r grac_r pect_r)
    ObjectGroup R_knee_bend: members=(bifemlh_r bifemsh_r grac_r med_gas_r sar_r)
    ObjectGroup R_knee_ext: members=(rect_fem_r vas_int_r)
    ObjectGroup R_ankle_pf: members=(med_gas_r soleus_r tib_post_r)
    ObjectGroup R_inverter: members=(tib_ant_r tib_post_r)
    ObjectGroup R_ankle_df: members=tib_ant_r
    ObjectGroup L_hip_abd: members=(glut_max1_l glut_med1_l glut_med2_l glut_med3_l peri_l sar_l tfl_l)
    ObjectGroup L_hip_flex: members=(glut_med1_l grac_l iliacus_l pect_l psoas_l rect_fem_l sar_l tfl_l)
    ObjectGroup L_hip_inrot: members=(glut_med1_l iliacus_l psoas_l tfl_l)
    ObjectGroup L_hip_exrot: members=(gem_l glut_med3_l peri_l quad_fem_l)
    ObjectGroup L_hip_ext: members=(add_mag2_l bifemlh_l glut_max1_l glut_max2_l glut_max3_l glut_med3_l)
    ObjectGroup L_hip_add: members=(add_mag2_l bifemlh_l grac_l pect_l)
    ObjectGroup L_knee_bend: members=(bifemlh_l bifemsh_l grac_l med_gas_l sar_l)
    ObjectGroup L_knee_ext: members=(rect_fem_l vas_int_l)
    ObjectGroup L_ankle_pf: members=(med_gas_l soleus_l tib_post_l)
    ObjectGroup L_inverter: members=(tib_ant_l tib_post_l)
    ObjectGroup L_ankle_df: members=tib_ant_l
    ObjectGroup back_ext: members=(ercspn_l ercspn_r)
    ObjectGroup back_rlb: members=(ercspn_r extobl_r intobl_r)
    ObjectGroup back_introt: members=(ercspn_r extobl_l intobl_r)
    ObjectGroup back_llb: members=(ercspn_l extobl_l intobl_l)
    ObjectGroup back_extrot: members=(ercspn_l extobl_r intobl_l)
    ObjectGroup back_flex: members=(extobl_l extobl_r intobl_l intobl_r)
  ContactGeometrySet:
    ContactHalfSpace platform: body_name=ground location=(0 0 0) orientation=(0 0 -1.570796)
    ContactSphere r_heel_lat: body_name=calcn_r location=(0 0 0.025) radius=0.01
    ContactSphere r_heel_med: body_name=calcn_r location=(0 0 -0.035) radius=0.01
    ContactSphere r_toe_lat: body_name=calcn_r location=(0.1425 0 0.041) radius=0.01
    ContactSphere r_toe_med: body_name=calcn_r location=(0.185 0 -0.0275) radius=0.01
    ContactSphere r_toe: body_name=toes_r location=(0.071 0.002 0.014) radius=0.01
    ContactSphere l_heel_lat: body_name=calcn_l location=(0 0 -0.025) radius=0.01
    ContactSphere l_heel_med: body_name=calcn_l location=(0 0 0.035) radius=0.01
    ContactSphere l_toe_lat: body_name=calcn_l location=(0.1425 0 -0.041) radius=0.01
    ContactSphere l_toe_med: body_name=calcn_l location=(0.185 0 0.0275) radius=0.01
    ContactSphere l_toe: body_name=toes_l location=(0.071 0.002 -0.014) radius=0.01
  ControllerSet Controllers:
    PrescribedController glut_med1_r: actuator_list=glut_med1_r
      FunctionSet ControlFunctions:
        PiecewiseConstantFunction: x=(0 0.00980392 0.0196078 0.0294118 0.0392157 0.0490196 0.0588235 0.0686275 0.0784314 0.0882353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)
            y=(0.414032 0.793474 0.344249 0.486262 0.743671 0.192857 0.107363 0.639051 0.391298 0.0940033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)
    PrescribedController glut_med1_l: actuator_list=glut_med1_l
      FunctionSet ControlFunctions:
        PiecewiseConstantFunction: x=(0 0.00980392 0.0196078 0.0294118 0.0392157 0.0490196 0.0588235 0.0686275 0.0784314 0.0882353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)
            y=(0.414032 0.793474 0.344249 0.486262 0.743671 0.192857 0.107363 0.639051 0.391298 0.0940033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)
    PrescribedController glut_med2_r: actuator_list=glut_med2_r
      FunctionSet ControlFunctions:
        PiecewiseConstantFunction: x=(0 0.00980392 0.0196078 0.0294118 0.0392157 0.0490196 0.0588235 0.0686275 0.0784314 0.0882353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)
            y=(0.13043 0.450692 0.369924 0.652822 0.318043 0.694332 0.316608 0.482949 0.838772 0.368885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)
    PrescribedController glut_med2_l: actuator_list=glut_med2_l
      FunctionSet ControlFunctions:
        PiecewiseConstantFunction: x=(0 0.00980392 0.0196078 0.0294118 0.0392157 0.0490196 0.0588235 0.0686275 0.0784314 0.0882353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)
            y=(0.13043 0.450692 0.369924 0.652822 0.318043 0.694332 0.316608 0.482949 0.838772 0.368885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)
    PrescribedController glut_med3_r: actuator_list=glut_med3_r
      FunctionSet ControlFunctions:
        PiecewiseConstantFunction: x=(0 0.00980392 0.0196078 0.0294118 0.0392157 0.0490196 0.0588235 0.0686275 0.0784314 0.0882353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)
            y=(0.526078 0.93141 0.561884 0.516804 0.727303 0.225683 0.643961 0.417257 0.329717 0.954704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)
    PrescribedController glut_med3_l: actuator_list=glut_med3_l
      FunctionSet ControlFunctions:
        PiecewiseConstantFunction: x=(0 0.00980392 0.0196078 0.0294118 0.0392157 0.0490196 0.0588235 0.0686275 0.0784314 0.0882353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)
            y=(0.526078 0.93141 0.561884 0.516804 0.727303 0.225683 0.643961 0.417257 0.329717 0.954704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)
    PrescribedController bifemlh_r: actuator_list=bifemlh_r
      FunctionSet ControlFunctions:
        PiecewiseConstantFunction: x=(0 0.00980392 0.0196078 0.0294118 0.0392157 0.0490196 0.0588235 0.0686275 0.0784314 0.0882353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)
            y=(0.680346 0.195987 0.851441 0.591846 0.984068 0.525385 0.84054 0.89503 0.951471 0.970126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)
    PrescribedController bifemlh_l: actuator_list=bifemlh_l
      FunctionSet ControlFunctions:
        PiecewiseConstantFunction: x=(0 0.00980392 0.0196078 0.0294118 0.0392157 0.0490196 0.0588235 0.0686275 0.0784314 0.0882353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)
            y=(0.680346 0.195987 0.851441 0.591846 0.984068 0.525385 0.84054 0.89503 0.951471 0.970126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)
    PrescribedController bifemsh_r: actuator_list=bifemsh_r
      FunctionSet ControlFunctions:
        PiecewiseConstantFunction: x=(0 0.00980392 0.0196078 0.0294118 0.0392157 0.0490196 0.0588235 0.0686275 0.0784314 0.0882353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)
            y=(0.549483 0.358755 0.407663 0.460567 0.344153 0.12004 0.399553 0.143408 0.337039 0.0892727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)
    PrescribedController bifemsh_l: actuator_list=bifemsh_l
      FunctionSet ControlFunctions:
        PiecewiseConstantFunction: x=(0 0.00980392 0.0196078 0.0294118 0.0392157 0.0490196 0.0588235 0.0686275 0.0784314 0.0882353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)
            y=(0.549483 0.358755 0.407663 0.460567 0.344153 0.12004 0.399553 0.143408 0.337039 0.0892727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)
    PrescribedController sar_r: actuator_list=sar_r
      FunctionSet ControlFunctions:
        PiecewiseConstantFunction: x=(0 0.00980392 0.0196078 0.0294118 0.0392157 0.0490196 0.0588235 0.0686275 0.0784314 0.0882353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)
            y=(0.220903 0.358595 0.312298 0.392236 0.632885 0.135223 0.170568 0.274827 0.128541 0.557042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)
    PrescribedController sar_l: actuator_list=sar_l
      FunctionSet ControlFunctions:
        PiecewiseConstantFunction: x=(0 0.00980392 0.0196078 0.0294118 0.0392157 0.0490196 0.0588235 0.0686275 0.0784314 0.0882353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)
            y=(0.220903 0.358595 0.312298 0.392236 0.632885 0.135223 0.170568 0.274827 0.128541 0.557042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)
    PrescribedController add_mag2_r: actuator_list=add_mag2_r
      FunctionSet ControlFunctions:
        PiecewiseConstantFunction: x=(0 0.00980392 0.0196078 0.0294118 0.0392157 0.0490196 0.0588235 0.0686275 0.0784314 0.0882353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)
            y=(0.628218 0.738919 0.847374 0.577461 0.207427 0.891309 0.863538 0.969093 0.507384 0.908964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)
    PrescribedController add_mag2_l: actuator_list=add_mag2_l
      FunctionSet ControlFunctions:
        PiecewiseConstantFunction: x=(0 0.00980392 0.0196078 0.0294118 0.0392157 0.0490196 0.0588235 0.0686275 0.0784314 0.0882353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)
            y=(0.628218 0.738919 0.847374 0.577461 0.207427 0.891309 0.863538 0.969093 0.507384 0.908964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)
    PrescribedController tfl_r: actuator_list=tfl_r
      FunctionSet ControlFunctions:
        PiecewiseConstantFunction: x=(0 0.00980392 0.0196078 0.0294118 0.0392157 0.0490196 0.0588235 0.0686275 0.0784314 0.0882353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)
            y=(0.542381 0.685046 0.667028 0.395208 0.599166 0.27859 0.828736 0.132015 0.407002 0.423799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)
    PrescribedController tfl_l: actuator_list=tfl_l
      FunctionSet ControlFunctions:
        PiecewiseConstantFunction: x=(0 0.00980392 0.0196078 0.0294118 0.0392157 0.0490196 0.0588235 0.0686275 0.0784314 0.0882353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)
            y=(0.542381 0.685046 0.667028 0.395208 0.599166 0.27859 0.828736 0.132015 0.407002 0.423799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)
    PrescribedController pect_r: actuator_list=pect_r
      FunctionSet ControlFunctions:
        PiecewiseConstantFunction: x=(0 0.00980392 0.0196078 0.0294118 0.0392157 0.0490196 0.0588235 0.0686275 0.0784314 0.0882353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)
            y=(0.622149 0.598949 0.5616 0.170531 0.108606 0.681829 0.723273 0.326414 0.532804 0.348704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)
    PrescribedController pect_l: actuator_list=pect_l
      FunctionSet ControlFunctions:
        PiecewiseConstantFunction: x=(0 0.00980392 0.0196078 0.0294118 0.0392157 0.0490196 0.0588235 0.0686275 0.0784314 0.0882353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)
            y=(0.622149 0.598949 0.5616 0.170531 0.108606 0.681829 0.723273 0.326414 0.532804 0.348704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)
    PrescribedController grac_r: actuator_list=grac_r
      FunctionSet ControlFunctions:
        PiecewiseConstantFunction: x=(0 0.00980392 0.0196078 0.0294118 0.0392157 0.0490196 0.0588235 0.0686275 0.0784314 0.0882353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)
            y=(0.0605176 0.428382 0.508674 0.601575 0.526994 0.810325 0.952702 0.462339 0.547318 0.411386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)
    PrescribedController grac_l: actuator_list=grac_l
      FunctionSet ControlFunctions:
        PiecewiseConstantFunction: x=(0 0.00980392 0.0196078 0.0294118 0.0392157 0.0490196 0.0588235 0.0686275 0.0784314 0.0882353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)
            y=(0.0605176 0.428382 0.508674 0.601575 0.526994 0.810325 0.952702 0.462339 0.547318 0.411386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)
    PrescribedController glut_max1_r: actuator_list=glut_max1_r
      FunctionSet ControlFunctions:
        PiecewiseConstantFunction: x=(0 0.00980392 0.0196078 0.0294118 0.0392157 0.0490196 0.0588235 0.0686275 0.0784314 0.0882353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)
            y=(0.9732 0.553794 0.794708 0.226646 0.449928 0.822283 0.415217 0.857829 0.689051 0.926377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)
    PrescribedController glut_max1_l: actuator_list=glut_max1_l
      FunctionSet ControlFunctions:
        PiecewiseConstantFunction: x=(0 0.00980392 0.0196078 0.0294118 0.0392157 0.0490196 0.0588235 0.0686275 0.0784314 0.0882353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)
            y=(0.9732 0.553794 0.794708 0.226646 0.449928 0.822283 0.415217 0.857829 0.689051 0.926377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)
    PrescribedController glut_max2_r: actuator_list=glut_max2_r
      FunctionSet ControlFunctions:
        PiecewiseConstantFunction: x=(0 0.00980392 0.0196078 0.0294118 0.0392157 0.0490196 0.0588235 0.0686275 0.0784314 0.0882353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)
            y=(0.516567 0.277077 0.811112 0.697126 0.901614 0.812015 0.591169 0.105889 0.718052 0.702219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)
    PrescribedController glut_max2_l: actuator_list=glut_max2_l
      FunctionSet ControlFunctions:
        PiecewiseConstantFunction: x=(0 0.00980392 0.0196078 0.0294118 0.0392157 0.0490196 0.0588235 0.0686275 0.0784314 0.0882353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)
            y=(0.516567 0.277077 0.811112 0.697126 0.901614 0.812015 0.591169 0.105889 0.718052 0.702219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)
    PrescribedController glut_max3_r: actuator_list=glut_max3_r
      FunctionSet ControlFunctions:
        PiecewiseConstantFunction: x=(0 0.00980392 0.0196078 0.0294118 0.0392157 0.0490196 0.0588235 0.0686275 0.0784314 0.0882353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)
            y=(0.784308 0.198975 0.878462 0.415953 0.509588 0.358971 0.836466 0.732918 0.122962 0.693212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)
    PrescribedController glut_max3_l: actuator_list=glut_max3_l
      FunctionSet ControlFunctions:
        PiecewiseConstantFunction: x=(0 0.00980392 0.0196078 0.0294118 0.0392157 0.0490196 0.0588235 0.0686275 0.0784314 0.0882353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)
            y=(0.784308 0.198975 0.878462 0.415953 0.509588 0.358971 0.836466 0.732918 0.122962 0.693212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)
    PrescribedController iliacus_r: actuator_list=iliacus_r
      FunctionSet ControlFunctions:
        PiecewiseConstantFunction: x=(0 0.00980392 0.0196078 0.0294118 0.0392157 0.0490196 0.0588235 0.0686275 0.0784314 0.0882353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)
            y=(0.259366 0.513719 0.0586253 0.157271 0.130524 0.145473 0.0955039 0.241445 0.111734 0.131104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)
    PrescribedController iliacus_l: actuator_list=iliacus_l
      FunctionSet ControlFunctions:
        PiecewiseConstantFunction: x=(0 0.00980392 0.0196078 0.0294118 0.0392157 0.0490196 0.0588235 0.0686275 0.0784314 0.0882353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)
            y=(0.259366 0.513719 0.0586253 0.157271 0.130524 0.145473 0.0955039 0.241445 0.111734 0.131104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)
    PrescribedController psoas_r: actuator_list=psoas_r
      FunctionSet ControlFunctions:
        PiecewiseConstantFunction: x=(0 0.00980392 0.0196078 0.0294118 0.0392157 0.0490196 0.0588235 0.0686275 0.0784314 0.0882353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)
            y=(0.529679 0.152259 0.520536 0.504136 0.396463 0.214594 0.116108 0.295403 0.167431 0.286295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)
    PrescribedController psoas_l: actuator_list=psoas_l
      FunctionSet ControlFunctions:
        PiecewiseConstantFunction: x=(0 0.00980392 0.0196078 0.0294118 0.0392157 0.0490196 0.0588235 0.0686275 0.0784314 0.0882353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)
            y=(0.529679 0.152259 0.520536 0.504136 0.396463 0.214594 0.116108 0.295403 0.167431 0.286295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)
    PrescribedController quad_fem_r: actuator_list=quad_fem_r
      FunctionSet ControlFunctions:
        PiecewiseConstantFunction: x=(0 0.00980392 0.0196078 0.0294118 0.0392157 0.0490196 0.0588235 0.0686275 0.0784314 0.0882353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)
            y=(0.785709 0.727633 0.171762 0.443289 0.48094 0.235389 0.0759057 0.830252 0.255027 0.334666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)
    PrescribedController quad_fem_l: actuator_list=quad_fem_l
      FunctionSet ControlFunctions:
        PiecewiseConstantFunction: x=(0 0.00980392 0.0196078 0.0294118 0.0392157 0.0490196 0.0588235 0.0686275 0.0784314 0.0882353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)
            y=(0.785709 0.727633 0.171762 0.443289 0.48094 0.235389 0.0759057 0.830252 0.255027 0.334666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)
    PrescribedController gem_r: actuator_list=gem_r
      FunctionSet ControlFunctions:
        PiecewiseConstantFunction: x=(0 0.00980392 0.0196078 0.0294118 0.0392157 0.0490196 0.0588235 0.0686275 0.0784314 0.0882353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)
            y=(0.457671 0.805637 0.283471 0.369848 0.744485 0.746786 0.795323 0.649857 0.413324 0.93572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)
    PrescribedController gem_l: actuator_list=gem_l
      FunctionSet ControlFunctions:
        PiecewiseConstantFunction: x=(0 0.00980392 0.0196078 0.0294118 0.0392157 0.0490196 0.0588235 0.0686275 0.0784314 0.0882353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)
            y=(0.457671 0.805637 0.283471 0.369848 0.744485 0.746786 0.795323 0.649857 0.413324 0.93572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)
    PrescribedController peri_r: actuator_list=peri_r
      FunctionSet ControlFunctions:
        PiecewiseConstantFunction: x=(0 0.00980392 0.0196078 0.0294118 0.0392157 0.0490196 0.0588235 0.0686275 0.0784314 0.0882353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)
            y=(0.388036 0.680017 0.191317 0.603878 0.650638 0.606746 0.463393 0.758365 0.390535 0.199461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)
    PrescribedController peri_l: actuator_list=peri_l
      FunctionSet ControlFunctions:
        PiecewiseConstantFunction: x=(0 0.00980392 0.0196078 0.0294118 0.0392157 0.0490196 0.0588235 0.0686275 0.0784314 0.0882353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)
            y=(0.388036 0.680017 0.191317 0.603878 0.650638 0.606746 0.463393 0.758365 0.390535 0.199461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)
    PrescribedController rect_fem_r: actuator_list=rect_fem_r
      FunctionSet ControlFunctions:
        PiecewiseConstantFunction: x=(0 0.00980392 0.0196078 0.0294118 0.0392157 0.0490196 0.0588235 0.0686275 0.0784314 0.0882353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)
            y=(0.832239 0.853179 0.792395 0.525334 0.35544 0.0786542 0.167711 0.326565 0.511233 0.37266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)
    PrescribedController rect_fem_l: actuator_list=rect_fem_l
      FunctionSet ControlFunctions:
        PiecewiseConstantFunction: x=(0 0.00980392 0.0196078 0.0294118 0.0392157 0.0490196 0.0588235 0.0686275 0.0784314 0.0882353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)
            y=(0.832239 0.853179 0.792395 0.525334 0.35544 0.0786542 0.167711 0.326565 0.511233 0.37266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)
    PrescribedController vas_int_r: actuator_list=vas_int_r
      FunctionSet ControlFunctions:
        PiecewiseConstantFunction: x=(0 0.00980392 0.0196078 0.0294118 0.0392157 0.0490196 0.0588235 0.0686275 0.0784314 0.0882353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)
            y=(0.777329 0.723054 0.799275 0.84957 0.961211 0.856017 0.956541 0.975282 0.941104 0.922886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)
    PrescribedController vas_int_l: actuator_list=vas_int_l
      FunctionSet ControlFunctions:
        PiecewiseConstantFunction: x=(0 0.00980392 0.0196078 0.0294118 0.0392157 0.0490196 0.0588235 0.0686275 0.0784314 0.0882353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)
            y=(0.777329 0.723054 0.799275 0.84957 0.961211 0.856017 0.956541 0.975282 0.941104 0.922886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)
    PrescribedController med_gas_r: actuator_list=med_gas_r
      FunctionSet ControlFunctions:
        PiecewiseConstantFunction: x=(0 0.00980392 0.0196078 0.0294118 0.0392157 0.0490196 0.0588235 0.0686275 0.0784314 0.0882353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)
            y=(0.122231 0.157746 0.129582 0.104108 0.0388641 0.0789097 0.264761 0.266525 0.123863 0.815104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)
    PrescribedController med_gas_l: actuator_list=med_gas_l
      FunctionSet ControlFunctions:
        PiecewiseConstantFunction: x=(0 0.00980392 0.0196078 0.0294118 0.0392157 0.0490196 0.0588235 0.0686275 0.0784314 0.0882353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)
            y=(0.122231 0.157746 0.129582 0.104108 0.0388641 0.0789097 0.264761 0.266525 0.123863 0.815104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)
    PrescribedController soleus_r: actuator_list=soleus_r
      FunctionSet ControlFunctions:
        PiecewiseConstantFunction: x=(0 0.00980392 0.0196078 0.0294118 0.0392157 0.0490196 0.0588235 0.0686275 0.0784314 0.0882353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)
            y=(0.0418958 0.24612 0.397644 0.140565 0.0862667 0.0870494 0.281055 0.262431 0.778319 0.605498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)
    PrescribedController soleus_l: actuator_list=soleus_l
      FunctionSet ControlFunctions:
        PiecewiseConstantFunction: x=(0 0.00980392 0.0196078 0.0294118 0.0392157 0.0490196 0.0588235 0.0686275 0.0784314 0.0882353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)
            y=(0.0418958 0.24612 0.397644 0.140565 0.0862667 0.0870494 0.281055 0.262431 0.778319 0.605498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)
    PrescribedController tib_post_r: actuator_list=tib_post_r
      FunctionSet ControlFunctions:
        PiecewiseConstantFunction: x=(0 0.00980392 0.0196078 0.0294118 0.0392157 0.0490196 0.0588235 0.0686275 0.0784314 0.0882353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)
            y=(0.466496 0.325625 0.626012 0.396233 0.953833 0.626694 0.416616 0.175864 0.751596 0.895393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)
    PrescribedController tib_post_l: actuator_list=tib_post_l
      FunctionSet ControlFunctions:
        PiecewiseConstantFunction: x=(0 0.00980392 0.0196078 0.0294118 0.0392157 0.0490196 0.0588235 0.0686275 0.0784314 0.0882353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)
            y=(0.466496 0.325625 0.626012 0.396233 0.953833 0.626694 0.416616 0.175864 0.751596 0.895393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)
    PrescribedController tib_ant_r: actuator_list=tib_ant_r
      FunctionSet ControlFunctions:
        PiecewiseConstantFunction: x=(0 0.00980392 0.0196078 0.0294118 0.0392157 0.0490196 0.0588235 0.0686275 0.0784314 0.0882353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)
            y=(0.664124 0.363075 0.947817 0.935316 0.644737 0.339867 0.917195 0.852463 0.49059 0.643318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)
    PrescribedController tib_ant_l: actuator_list=tib_ant_l
      FunctionSet ControlFunctions:
        PiecewiseConstantFunction: x=(0 0.00980392 0.0196078 0.0294118 0.0392157 0.0490196 0.0588235 0.0686275 0.0784314 0.0882353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)
            y=(0.664124 0.363075 0.947817 0.935316 0.644737 0.339867 0.917195 0.852463 0.49059 0.643318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)
    PrescribedController ercspn_r: actuator_list=ercspn_r
      FunctionSet ControlFunctions:
        PiecewiseLinearFunction: x=(0 0.00980392 0.0196078 0.0294118 0.0392157 0.0490196 0.0588235 0.0686275 0.0784314 0.0882353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)
            y=(0.900363 0.895311 0.936263 0.812509 0.9227 0.925552 0.96649 0.982453 0.912607 0.921654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)
    PrescribedController ercspn_l: actuator_list=ercspn_l
      FunctionSet ControlFunctions:
        PiecewiseLinearFunction: x=(0 0.00980392 0.0196078 0.0294118 0.0392157 0.0490196 0.0588235 0.0686275 0.0784314 0.0882353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)
            y=(0.900363 0.895311 0.936263 0.812509 0.9227 0.925552 0.96649 0.982453 0.912607 0.921654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)
    PrescribedController intobl_r: actuator_list=intobl_r
      FunctionSet ControlFunctions:
        PiecewiseLinearFunction: x=(0 0.00980392 0.0196078 0.0294118 0.0392157 0.0490196 0.0588235 0.0686275 0.0784314 0.0882353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)
            y=(0.378427 0.143014 0.471762 0.16885 0.345749 0.264349 0.0999212 0.312691 0.16281 0.0827279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)
    PrescribedController intobl_l: actuator_list=intobl_l
      FunctionSet ControlFunctions:
        PiecewiseLinearFunction: x=(0 0.00980392 0.0196078 0.0294118 0.0392157 0.0490196 0.0588235 0.0686275 0.0784314 0.0882353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)
            y=(0.378427 0.143014 0.471762 0.16885 0.345749 0.264349 0.0999212 0.312691 0.16281 0.0827279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)
    PrescribedController extobl_r: actuator_list=extobl_r
      FunctionSet ControlFunctions:
        PiecewiseLinearFunction: x=(0 0.00980392 0.0196078 0.0294118 0.0392157 0.0490196 0.0588235 0.0686275 0.0784314 0.0882353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)
            y=(0.0220597 0.138406 0.062146 0.0320685 0.159604 0.0628029 0.0797419 0.127642 0.0461498 0.169183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)
    PrescribedController extobl_l: actuator_list=extobl_l
      FunctionSet ControlFunctions:
        PiecewiseLinearFunction: x=(0 0.00980392 0.0196078 0.0294118 0.0392157 0.0490196 0.0588235 0.0686275 0.0784314 0.0882353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)
            y=(0.0220597 0.138406 0.062146 0.0320685 0.159604 0.0628029 0.0797419 0.127642 0.0461498 0.169183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)
